// SBML level 2 version 4

model D1_LTP_time_window()
  // D1_LTP_time_window

  // Compartments:
  compartment Spine = 1 MWBUILTINUNIT_liter;

  // Species:
  species AC5 in Spine = 700;  // substance in mole
  species AC5_ATP in Spine = 0;  // substance in mole
  species AC5_Ca in Spine = 0;  // substance in mole
  species AC5_Ca_ATP in Spine = 0;  // substance in mole
  species AC5_Ca_GaolfGTP in Spine = 0;  // substance in mole
  species AC5_Ca_GaolfGTP_ATP in Spine = 0;  // substance in mole
  species AC5_GaolfGTP in Spine = 0;  // substance in mole
  species AC5_GaolfGTP_ATP in Spine = 0;  // substance in mole
  species $AMP in Spine = 0;  // substance in mole
  species $ATP in Spine = 5000000;  // substance in mole
  species B56PP2A in Spine = 2000;  // substance in mole
  species B56PP2A_D32p75 in Spine = 0;  // substance in mole
  species B56PP2A_pARPP21 in Spine = 0;  // substance in mole
  species B56PP2Ap in Spine = 0;  // substance in mole
  species B56PP2Ap_D32p75 in Spine = 0;  // substance in mole
  species B56PP2Ap_pARPP21 in Spine = 0;  // substance in mole
  species B72PP2A in Spine = 2000;  // substance in mole
  species B72PP2A_D32p34 in Spine = 0;  // substance in mole
  species B72PP2A_D32p75 in Spine = 0;  // substance in mole
  species B72PP2A_pARPP21 in Spine = 0;  // substance in mole
  species B72PP2A_Ca_D32p34 in Spine = 0;  // substance in mole
  species B72PP2A_Ca_D32p75 in Spine = 0;  // substance in mole
  species B72PP2A_Ca in Spine = 0;  // substance in mole
  species B72PP2A_Ca_pARPP21 in Spine = 0;  // substance in mole
  species $Ca in Spine = 60;  // substance in mole
  species CaM in Spine = 9000;  // substance in mole
  species CaM_Ca2 in Spine = 0;  // substance in mole
  species CaM_Ca4 in Spine = 0;  // substance in mole
  species CaM_Ca4_pARPP21 in Spine = 0;  // substance in mole
  species CaMKII in Spine = 20000;  // substance in mole
  species CaMKII_CaM_Ca4 in Spine = 0;  // substance in mole
  species CaMKII_CaM in Spine = 0;  // substance in mole
  species CaMKII_CaM_Ca2 in Spine = 0;  // substance in mole
  species CaMKII_CaM_Ca2_psd in Spine = 0;  // substance in mole
  species CaMKII_CaM_psd in Spine = 0;  // substance in mole
  species CaMKII_CaM_Ca4_psd in Spine = 0;  // substance in mole
  species CaMKII_psd in Spine = 0;  // substance in mole
  species cAMP in Spine = 0;  // substance in mole
  species Substrate in Spine = 3000;  // substance in mole
  species CDK5 in Spine = 1800;  // substance in mole
  species CDK5_D32 in Spine = 0;  // substance in mole
  species D1R in Spine = 2000;  // substance in mole
  species D1R_DA in Spine = 0;  // substance in mole
  species D1R_Golf_DA in Spine = 0;  // substance in mole
  species D1R_Golf in Spine = 0;  // substance in mole
  species D32p34 in Spine = 0;  // substance in mole
  species D32p75 in Spine = 0;  // substance in mole
  species $DA in Spine = 20;  // substance in mole
  species D32 in Spine = 50000;  // substance in mole
  species GaolfGDP in Spine = 0;  // substance in mole
  species GaolfGTP in Spine = 0;  // substance in mole
  species Gbgolf in Spine = 0;  // substance in mole
  species Golf in Spine = 2000;  // substance in mole
  species pCaMKII in Spine = 0;  // substance in mole
  species pCaMKII_CaM_Ca4 in Spine = 0;  // substance in mole
  species pCaMKII_CaM in Spine = 0;  // substance in mole
  species pCaMKII_CaM_Ca2 in Spine = 0;  // substance in mole
  species pCaMKII_CaM_Ca2_psd in Spine = 0;  // substance in mole
  species pCaMKII_CaM_psd in Spine = 0;  // substance in mole
  species pCaMKII_CaM_Ca4_psd in Spine = 0;  // substance in mole
  species pCaMKII_psd in Spine = 0;  // substance in mole
  species pSubstrate in Spine = 0;  // substance in mole
  species PDE4 in Spine = 2000;  // substance in mole
  species PDE4_cAMP in Spine = 0;  // substance in mole
  species PDE10r in Spine = 700;  // substance in mole
  species PDE10r_cAMP in Spine = 0;  // substance in mole
  species PDE10c in Spine = 0;  // substance in mole
  species PDE10c_cAMP in Spine = 0;  // substance in mole
  species PKA in Spine = 1200;  // substance in mole
  species PKAc in Spine = 0;  // substance in mole
  species PKAc_B56PP2A in Spine = 0;  // substance in mole
  species PKAc_D32 in Spine = 0;  // substance in mole
  species PKAc_ARPP21 in Spine = 0;  // substance in mole
  species PKA_Ca2MP in Spine = 0;  // substance in mole
  species PKA_Ca4MP in Spine = 0;  // substance in mole
  species PKAc_D32p75 in Spine = 0;  // substance in mole
  species PKAreg in Spine = 0;  // substance in mole
  species PP1 in Spine = 3000;  // substance in mole
  species PP1_pCaMKII_psd in Spine = 0;  // substance in mole
  species PP1_pSubstrate in Spine = 0;  // substance in mole
  species PP1_D32p34 in Spine = 0;  // substance in mole
  species CaMKII_CaM_Ca4_psd_CaMKII_CaM_Ca4_psd in Spine = 0;  // substance in mole
  species pCaMKII_CaM_Ca4_psd_CaMKII_CaM_Ca4_psd in Spine = 0;  // substance in mole
  species CaMKII_CaM_Ca4_CaMKII_CaM_Ca4 in Spine = 0;  // substance in mole
  species pCaMKII_CaM_Ca4_CaMKII_CaM_Ca4 in Spine = 0;  // substance in mole
  species PP2B in Spine = 4000;  // substance in mole
  species PP2Bc in Spine = 0;  // substance in mole
  species PP2Bc_D32p34 in Spine = 0;  // substance in mole
  species PP2B_CaM in Spine = 0;  // substance in mole
  species PP2B_CaM_Ca2 in Spine = 0;  // substance in mole
  species pARPP21 in Spine = 0;  // substance in mole
  species ARPP21 in Spine = 20000;  // substance in mole
  species pCaMKII_psd_Substrate in Spine = 0;  // substance in mole
  species pCaMKII_CaM_psd_Substrate in Spine = 0;  // substance in mole
  species pCaMKII_CaM_Ca2_psd_Substrate in Spine = 0;  // substance in mole
  species pCaMKII_CaM_Ca4_psd_Substrate in Spine = 0;  // substance in mole
  species CaMKII_CaM_psd_Substrate in Spine = 0;  // substance in mole
  species CaMKII_CaM_Ca2_psd_Substrate in Spine = 0;  // substance in mole
  species CaMKII_CaM_Ca4_psd_Substrate in Spine = 0;  // substance in mole
  species ATP_expression in Spine = 5000000;  // substance in mole
  species Ca_expression in Spine = 0;  // substance in mole
  species DA_expression in Spine;  // substance in mole
  species DA_max in Spine = 1500;  // substance in mole
  species DA_basal in Spine = 20;  // substance in mole
  species Ca_basal in Spine = 60;  // substance in mole

  // Parameters:
  kf_GaolfGTP__GaolfGDP = 0.03 MWDERIVEDUNIT_1__millisecond;
  kf_D1R_Golf_DA__GbgolfXD1R_DAXGaolfGTP = 0.015 MWDERIVEDUNIT_1__millisecond;
  kf_D1R_GolfXDA__D1R_Golf_DA = 5e-5 MWDERIVEDUNIT_1__nanomolarity_millisecond;
  kr_D1R_GolfXDA__D1R_Golf_DA = 0.25 MWDERIVEDUNIT_1__millisecond;
  kf_D1RXDA__D1R_DA = 5e-5 MWDERIVEDUNIT_1__nanomolarity_millisecond;
  kr_D1RXDA__D1R_DA = 0.25 MWDERIVEDUNIT_1__millisecond;
  kf_AC5XGaolfGTP__AC5_GaolfGTP = 0.01 MWDERIVEDUNIT_1__nanomolarity_millisecond;
  kr_AC5XGaolfGTP__AC5_GaolfGTP = 0.001 MWDERIVEDUNIT_1__millisecond;
  kf_CaMXCa__CaM_Ca2 = 6e-6 MWDERIVEDUNIT_1__nanomolarity_millisecond;
  kr_CaMXCa__CaM_Ca2 = 0.02 MWDERIVEDUNIT_1__millisecond;
  kf_PP2BXCaM__PP2B_CaM = 0.0001 MWDERIVEDUNIT_1__nanomolarity_millisecond;
  kr_PP2BXCaM__PP2B_CaM = 3 MWDERIVEDUNIT_1__millisecond;
  kf_CaM_Ca4XPP2B__PP2Bc = 0.0001 MWDERIVEDUNIT_1__nanomolarity_millisecond;
  kr_CaM_Ca4XPP2B__PP2Bc = 3e-6 MWDERIVEDUNIT_1__millisecond;
  kf_PKAcXD32__PKAc_D32 = 1e-5 MWDERIVEDUNIT_1__nanomolarity_millisecond;
  kr_PKAcXD32__PKAc_D32 = 0.2 MWDERIVEDUNIT_1__millisecond;
  kf_PKAc_D32__D32p34XPKAc = 0.01 MWDERIVEDUNIT_1__millisecond;
  kf_PKAcXB56PP2A__PKAc_B56PP2A = 1e-6 MWDERIVEDUNIT_1__nanomolarity_millisecond;
  kr_PKAcXB56PP2A__PKAc_B56PP2A = 0.0003 MWDERIVEDUNIT_1__millisecond;
  kf_PKAc_B56PP2A__B56PP2ApXPKAc = 0.0002 MWDERIVEDUNIT_1__millisecond;
  kf_D32p34XPP1__PP1_D32p34 = 0.001 MWDERIVEDUNIT_1__nanomolarity_millisecond;
  kr_D32p34XPP1__PP1_D32p34 = 0.0015 MWDERIVEDUNIT_1__millisecond;
  kf_CDK5XD32__CDK5_D32 = 1e-6 MWDERIVEDUNIT_1__nanomolarity_millisecond;
  kr_CDK5XD32__CDK5_D32 = 0.1 MWDERIVEDUNIT_1__millisecond;
  kf_CDK5_D32__CDK5XD32p75 = 0.01 MWDERIVEDUNIT_1__millisecond;
  kf_D32p75XPKAc__PKAc_D32p75 = 0.0001 MWDERIVEDUNIT_1__nanomolarity_millisecond;
  kr_D32p75XPKAc__PKAc_D32p75 = 0.1 MWDERIVEDUNIT_1__millisecond;
  kf_B72PP2AXCa__B72PP2A_Ca = 1e-5 MWDERIVEDUNIT_1__nanomolarity_millisecond;
  kr_B72PP2AXCa__B72PP2A_Ca = 0.01 MWDERIVEDUNIT_1__millisecond;
  kf_B56PP2ApXD32p75__B56PP2Ap_D32p75 = 1.5e-5 MWDERIVEDUNIT_1__nanomolarity_millisecond;
  kr_B56PP2ApXD32p75__B56PP2Ap_D32p75 = 0.1 MWDERIVEDUNIT_1__millisecond;
  kf_B72PP2AXD32p75__B72PP2A_D32p75 = 8e-6 MWDERIVEDUNIT_1__nanomolarity_millisecond;
  kr_B72PP2AXD32p75__B72PP2A_D32p75 = 0.1 MWDERIVEDUNIT_1__millisecond;
  kf_D32p75XB72PP2A_Ca__B72PP2A_Ca_D32p75 = 1.5e-5 MWDERIVEDUNIT_1__nanomolarity_millisecond;
  kr_D32p75XB72PP2A_Ca__B72PP2A_Ca_D32p75 = 0.1 MWDERIVEDUNIT_1__millisecond;
  kf_B56PP2Ap_D32p75__B56PP2ApXD32 = 0.008 MWDERIVEDUNIT_1__millisecond;
  kf_B72PP2A_D32p75__B72PP2AXD32 = 0.0015 MWDERIVEDUNIT_1__millisecond;
  kf_B72PP2A_Ca_D32p75__B72PP2A_CaXD32 = 0.008 MWDERIVEDUNIT_1__millisecond;
  kf_D32p34XPP2Bc__PP2Bc_D32p34 = 0.0013 MWDERIVEDUNIT_1__nanomolarity_millisecond;
  kr_D32p34XPP2Bc__PP2Bc_D32p34 = 0.0001 MWDERIVEDUNIT_1__millisecond;
  kf_CaM_Ca2XCa__CaM_Ca4 = 0.0001 MWDERIVEDUNIT_1__nanomolarity_millisecond;
  kr_CaM_Ca2XCa__CaM_Ca4 = 1 MWDERIVEDUNIT_1__millisecond;
  kf_CaXPP2B_CaM__PP2B_CaM_Ca2 = 6e-6 MWDERIVEDUNIT_1__nanomolarity_millisecond;
  kr_CaXPP2B_CaM__PP2B_CaM_Ca2 = 2e-7 MWDERIVEDUNIT_1__millisecond;
  kf_CaXPP2B_CaM_Ca2__PP2Bc = 0.0001 MWDERIVEDUNIT_1__nanomolarity_millisecond;
  kr_CaXPP2B_CaM_Ca2__PP2Bc = 0.1 MWDERIVEDUNIT_1__millisecond;
  kf_CaM_Ca2XPP2B__PP2B_CaM_Ca2 = 0.0001 MWDERIVEDUNIT_1__nanomolarity_millisecond;
  kr_CaM_Ca2XPP2B__PP2B_CaM_Ca2 = 3e-5 MWDERIVEDUNIT_1__millisecond;
  kf_AC5XCa__AC5_Ca = 1e-6 MWDERIVEDUNIT_1__nanomolarity_millisecond;
  kr_AC5XCa__AC5_Ca = 0.01 MWDERIVEDUNIT_1__millisecond;
  kf_AC5_CaXGaolfGTP__AC5_Ca_GaolfGTP = 0.01 MWDERIVEDUNIT_1__nanomolarity_millisecond;
  kr_AC5_CaXGaolfGTP__AC5_Ca_GaolfGTP = 0.001 MWDERIVEDUNIT_1__millisecond;
  kf_D32p75XB56PP2A__B56PP2A_D32p75 = 8e-6 MWDERIVEDUNIT_1__nanomolarity_millisecond;
  kr_D32p75XB56PP2A__B56PP2A_D32p75 = 0.1 MWDERIVEDUNIT_1__millisecond;
  kf_B56PP2A_D32p75__B56PP2AXD32 = 0.0015 MWDERIVEDUNIT_1__millisecond;
  kf_B72PP2A_Ca_D32p34__B72PP2A_CaXD32 = 0.003 MWDERIVEDUNIT_1__millisecond;
  kf_B72PP2A_D32p34__D32XB72PP2A = 0.003 MWDERIVEDUNIT_1__millisecond;
  kf_D32p34XB72PP2A_Ca__B72PP2A_Ca_D32p34 = 5e-7 MWDERIVEDUNIT_1__nanomolarity_millisecond;
  kr_D32p34XB72PP2A_Ca__B72PP2A_Ca_D32p34 = 0.001 MWDERIVEDUNIT_1__millisecond;
  kf_D32p34XB72PP2A__B72PP2A_D32p34 = 5e-7 MWDERIVEDUNIT_1__nanomolarity_millisecond;
  kr_D32p34XB72PP2A__B72PP2A_D32p34 = 0.001 MWDERIVEDUNIT_1__millisecond;
  kf_PP2Bc_D32p34__D32XPP2Bc = 0.0012 MWDERIVEDUNIT_1__millisecond;
  kf_B56PP2Ap__B56PP2A = 8e-6 MWDERIVEDUNIT_1__millisecond;
  kf_cAMPXPKA__PKA_Ca2MP = 2.6e-5 MWDERIVEDUNIT_1__nanomolarity_millisecond;
  kr_cAMPXPKA__PKA_Ca2MP = 0.35 MWDERIVEDUNIT_1__millisecond;
  kf_cAMPXPKA_Ca2MP__PKA_Ca4MP = 3.46e-5 MWDERIVEDUNIT_1__nanomolarity_millisecond;
  kr_cAMPXPKA_Ca2MP__PKA_Ca4MP = 0.05 MWDERIVEDUNIT_1__millisecond;
  kf_PKA_Ca4MP__PKAcXPKAreg = 0.05 MWDERIVEDUNIT_1__millisecond;
  kr_PKA_Ca4MP__PKAcXPKAreg = 3e-5 MWDERIVEDUNIT_1__nanomolarity_millisecond;
  kf_cAMPXPDE4__PDE4_cAMP = 3e-5 MWDERIVEDUNIT_1__nanomolarity_millisecond;
  kr_cAMPXPDE4__PDE4_cAMP = 0.001 MWDERIVEDUNIT_1__millisecond;
  kf_PDE4_cAMP__PDE4XAMP = 0.0025 MWDERIVEDUNIT_1__millisecond;
  kf_PDE10rX2_cAMP__PDE10c = 1e-9 MWDERIVEDUNIT_1__nanomolarity___2_millisecond;
  kr_PDE10rX2_cAMP__PDE10c = 0.001 MWDERIVEDUNIT_1__millisecond;
  kf_PDE10r_cAMP__PDE10rXAMP = 0.003 MWDERIVEDUNIT_1__millisecond;
  kf_cAMPXPDE10r__PDE10r_cAMP = 0.0001 MWDERIVEDUNIT_1__nanomolarity_millisecond;
  kr_cAMPXPDE10r__PDE10r_cAMP = 0.002 MWDERIVEDUNIT_1__millisecond;
  kf_PDE10c_cAMP__PDE10cXAMP = 0.01 MWDERIVEDUNIT_1__millisecond;
  kf_GaolfGDPXGbgolf__Golf = 0.1 MWDERIVEDUNIT_1__nanomolarity_millisecond;
  kf_AC5_GaolfGTPXATP__AC5_GaolfGTP_ATP = 2.55e-6 MWDERIVEDUNIT_1__nanomolarity_millisecond;
  kr_AC5_GaolfGTPXATP__AC5_GaolfGTP_ATP = 0.001 MWDERIVEDUNIT_1__millisecond;
  kf_AC5XATP__AC5_ATP = 1e-7 MWDERIVEDUNIT_1__nanomolarity_millisecond;
  kr_AC5XATP__AC5_ATP = 0.001 MWDERIVEDUNIT_1__millisecond;
  kf_AC5_CaXATP__AC5_Ca_ATP = 7.5e-8 MWDERIVEDUNIT_1__nanomolarity_millisecond;
  kr_AC5_CaXATP__AC5_Ca_ATP = 0.001 MWDERIVEDUNIT_1__millisecond;
  kf_AC5_Ca_GaolfGTPXATP__AC5_Ca_GaolfGTP_ATP = 1.3e-6 MWDERIVEDUNIT_1__nanomolarity_millisecond;
  kr_AC5_Ca_GaolfGTPXATP__AC5_Ca_GaolfGTP_ATP = 0.001 MWDERIVEDUNIT_1__millisecond;
  kf_GaolfGTPXAC5_ATP__AC5_GaolfGTP_ATP = 0.01 MWDERIVEDUNIT_1__nanomolarity_millisecond;
  kr_GaolfGTPXAC5_ATP__AC5_GaolfGTP_ATP = 0.001 MWDERIVEDUNIT_1__millisecond;
  kf_GaolfGTPXAC5_Ca_ATP__AC5_Ca_GaolfGTP_ATP = 0.01 MWDERIVEDUNIT_1__nanomolarity_millisecond;
  kr_GaolfGTPXAC5_Ca_ATP__AC5_Ca_GaolfGTP_ATP = 0.001 MWDERIVEDUNIT_1__millisecond;
  kf_CaXAC5_ATP__AC5_Ca_ATP = 1e-6 MWDERIVEDUNIT_1__nanomolarity_millisecond;
  kr_CaXAC5_ATP__AC5_Ca_ATP = 0.01 MWDERIVEDUNIT_1__millisecond;
  kf_AC5_GaolfGTP_ATP__cAMPXAC5_GaolfGTP = 0.05 MWDERIVEDUNIT_1__millisecond;
  kf_cAMPXAC5_GaolfGTP__AC5_GaolfGTP_ATP = 0.00255 MWDERIVEDUNIT_1__nanomolarity_millisecond;
  kf_AC5_ATP__cAMPXAC5 = 0.001 MWDERIVEDUNIT_1__millisecond;
  kf_cAMPXAC5__AC5_ATP = 2e-6 MWDERIVEDUNIT_1__nanomolarity_millisecond;
  kf_AC5_Ca_ATP__cAMPXAC5_Ca = 0.0005 MWDERIVEDUNIT_1__millisecond;
  kf_cAMPXAC5_Ca__AC5_Ca_ATP = 7.5e-7 MWDERIVEDUNIT_1__nanomolarity_millisecond;
  kf_AC5_Ca_GaolfGTP_ATP__cAMPXAC5_Ca_GaolfGTP = 0.025 MWDERIVEDUNIT_1__millisecond;
  kf_cAMPXAC5_Ca_GaolfGTP__AC5_Ca_GaolfGTP_ATP = 0.00065 MWDERIVEDUNIT_1__nanomolarity_millisecond;
  kf_AC5_GaolfGTP__AC5XGaolfGDP = 0.001 MWDERIVEDUNIT_1__millisecond;
  kf_AC5_Ca_GaolfGTP__AC5_CaXGaolfGDP = 0.001 MWDERIVEDUNIT_1__millisecond;
  kf_AC5_GaolfGTP_ATP__AC5_ATPXGaolfGDP = 0.001 MWDERIVEDUNIT_1__millisecond;
  kf_AC5_Ca_GaolfGTP_ATP__AC5_Ca_ATPXGaolfGDP = 0.001 MWDERIVEDUNIT_1__millisecond;
  kf_D1RXGolf__D1R_Golf = 6e-5 MWDERIVEDUNIT_1__nanomolarity_millisecond;
  kr_D1RXGolf__D1R_Golf = 0.25 MWDERIVEDUNIT_1__millisecond;
  kf_GolfXD1R_DA__D1R_Golf_DA = 6e-5 MWDERIVEDUNIT_1__nanomolarity_millisecond;
  kr_GolfXD1R_DA__D1R_Golf_DA = 0.25 MWDERIVEDUNIT_1__millisecond;
  kf_cAMPXPDE10c__PDE10c_cAMP = 0.0001 MWDERIVEDUNIT_1__nanomolarity_millisecond;
  kr_cAMPXPDE10c__PDE10c_cAMP = 0.002 MWDERIVEDUNIT_1__millisecond;
  kf_CaMKIIXCaM_Ca4__CaMKII_CaM_Ca4 = 0.0001 MWDERIVEDUNIT_1__nanomolarity_millisecond;
  kr_CaMKIIXCaM_Ca4__CaMKII_CaM_Ca4 = 0.04 MWDERIVEDUNIT_1__millisecond;
  kf_CaM_Ca2XCaMKII__CaMKII_CaM_Ca2 = 0.0001 MWDERIVEDUNIT_1__nanomolarity_millisecond;
  kr_CaM_Ca2XCaMKII__CaMKII_CaM_Ca2 = 0.4 MWDERIVEDUNIT_1__millisecond;
  kf_CaMXCaMKII__CaMKII_CaM = 0.0001 MWDERIVEDUNIT_1__nanomolarity_millisecond;
  kr_CaMXCaMKII__CaMKII_CaM = 4 MWDERIVEDUNIT_1__millisecond;
  kf_CaMKII_CaM_Ca2XCa__CaMKII_CaM_Ca4 = 0.0001 MWDERIVEDUNIT_1__nanomolarity_millisecond;
  kr_CaMKII_CaM_Ca2XCa__CaMKII_CaM_Ca4 = 0.1 MWDERIVEDUNIT_1__millisecond;
  kf_CaMKII_CaMXCa__CaMKII_CaM_Ca2 = 6e-6 MWDERIVEDUNIT_1__nanomolarity_millisecond;
  kr_CaMKII_CaMXCa__CaMKII_CaM_Ca2 = 0.002 MWDERIVEDUNIT_1__millisecond;
  kf_pCaMKII_CaM_Ca2XCa__pCaMKII_CaM_Ca4 = 0.0001 MWDERIVEDUNIT_1__nanomolarity_millisecond;
  kr_pCaMKII_CaM_Ca2XCa__pCaMKII_CaM_Ca4 = 0.01 MWDERIVEDUNIT_1__millisecond;
  kf_pCaMKII_CaMXCa__pCaMKII_CaM_Ca2 = 6e-6 MWDERIVEDUNIT_1__nanomolarity_millisecond;
  kr_pCaMKII_CaMXCa__pCaMKII_CaM_Ca2 = 0.002 MWDERIVEDUNIT_1__millisecond;
  kf_pCaMKIIXCaM_Ca4__pCaMKII_CaM_Ca4 = 0.0001 MWDERIVEDUNIT_1__nanomolarity_millisecond;
  kr_pCaMKIIXCaM_Ca4__pCaMKII_CaM_Ca4 = 0.0004 MWDERIVEDUNIT_1__millisecond;
  kf_pCaMKIIXCaM_Ca2__pCaMKII_CaM_Ca2 = 0.0001 MWDERIVEDUNIT_1__nanomolarity_millisecond;
  kr_pCaMKIIXCaM_Ca2__pCaMKII_CaM_Ca2 = 0.04 MWDERIVEDUNIT_1__millisecond;
  kf_pCaMKIIXCaM__pCaMKII_CaM = 0.0001 MWDERIVEDUNIT_1__nanomolarity_millisecond;
  kr_pCaMKIIXCaM__pCaMKII_CaM = 0.4 MWDERIVEDUNIT_1__millisecond;
  kf_ARPP21XPKAc__PKAc_ARPP21 = 4.5e-5 MWDERIVEDUNIT_1__nanomolarity_millisecond;
  kr_ARPP21XPKAc__PKAc_ARPP21 = 0.2 MWDERIVEDUNIT_1__millisecond;
  kf_PKAc_ARPP21__PKAcXpARPP21 = 0.01 MWDERIVEDUNIT_1__millisecond;
  kf_pARPP21XCaM_Ca4__CaM_Ca4_pARPP21 = 0.0005 MWDERIVEDUNIT_1__nanomolarity_millisecond;
  kr_pARPP21XCaM_Ca4__CaM_Ca4_pARPP21 = 0.01 MWDERIVEDUNIT_1__millisecond;
  kf_B72PP2A_Ca_pARPP21__ARPP21XB72PP2A_Ca = 0.01 MWDERIVEDUNIT_1__millisecond;
  kf_pARPP21XB72PP2A_Ca__B72PP2A_Ca_pARPP21 = 7e-6 MWDERIVEDUNIT_1__nanomolarity_millisecond;
  kr_pARPP21XB72PP2A_Ca__B72PP2A_Ca_pARPP21 = 0.1 MWDERIVEDUNIT_1__millisecond;
  kf_B72PP2A_pARPP21__ARPP21XB72PP2A = 0.001 MWDERIVEDUNIT_1__millisecond;
  kf_pARPP21XB72PP2A__B72PP2A_pARPP21 = 4e-6 MWDERIVEDUNIT_1__nanomolarity_millisecond;
  kr_pARPP21XB72PP2A__B72PP2A_pARPP21 = 0.1 MWDERIVEDUNIT_1__millisecond;
  kf_B56PP2Ap_pARPP21__ARPP21XB56PP2Ap = 0.01 MWDERIVEDUNIT_1__millisecond;
  kf_pARPP21XB56PP2Ap__B56PP2Ap_pARPP21 = 7e-6 MWDERIVEDUNIT_1__nanomolarity_millisecond;
  kr_pARPP21XB56PP2Ap__B56PP2Ap_pARPP21 = 0.1 MWDERIVEDUNIT_1__millisecond;
  kf_B56PP2A_pARPP21__ARPP21XB56PP2A = 0.001 MWDERIVEDUNIT_1__millisecond;
  kf_pARPP21XB56PP2A__B56PP2A_pARPP21 = 4e-6 MWDERIVEDUNIT_1__nanomolarity_millisecond;
  kr_pARPP21XB56PP2A__B56PP2A_pARPP21 = 0.1 MWDERIVEDUNIT_1__millisecond;
  kf_pSubstrateXPP1__PP1_pSubstrate = 5e-7 MWDERIVEDUNIT_1__nanomolarity_millisecond;
  kr_pSubstrateXPP1__PP1_pSubstrate = 0.001 MWDERIVEDUNIT_1__millisecond;
  kf_PP1_pSubstrate__PP1XSubstrate = 0.01 MWDERIVEDUNIT_1__millisecond;
  kf_SubstrateXpCaMKII_psd__pCaMKII_psd_Substrate = 5e-7 MWDERIVEDUNIT_1__nanomolarity_millisecond;
  kr_SubstrateXpCaMKII_psd__pCaMKII_psd_Substrate = 0.01 MWDERIVEDUNIT_1__millisecond;
  kf_pCaMKII_psd_Substrate__pCaMKII_psdXpSubstrate = 0.01 MWDERIVEDUNIT_1__millisecond;
  kf_pCaMKII__CaMKII = 0.0001 MWDERIVEDUNIT_1__millisecond;
  kf_SubstrateXpCaMKII_CaM_psd__pCaMKII_CaM_psd_Substrate = 5e-7 MWDERIVEDUNIT_1__nanomolarity_millisecond;
  kr_SubstrateXpCaMKII_CaM_psd__pCaMKII_CaM_psd_Substrate = 0.01 MWDERIVEDUNIT_1__millisecond;
  kf_pCaMKII_CaM_psd_Substrate__pCaMKII_CaM_psdXpSubstrate = 0.01 MWDERIVEDUNIT_1__millisecond;
  parameter_265 = 5e-7 MWDERIVEDUNIT_1__nanomolarity_millisecond; parameter_265 is "kf_SubstrateXpCaMKII_CaM_Ca2_psd__pCaMKII_CaM_Ca2_psd_Substrate";
  parameter_266 = 0.01 MWDERIVEDUNIT_1__millisecond; parameter_266 is "kr_SubstrateXpCaMKII_CaM_Ca2_psd__pCaMKII_CaM_Ca2_psd_Substrate";
  parameter_267 = 0.01 MWDERIVEDUNIT_1__millisecond; parameter_267 is "kf_pCaMKII_CaM_Ca2_psd_Substrate__pCaMKII_CaM_Ca2_psdXpSubstrate";
  parameter_268 = 5e-7 MWDERIVEDUNIT_1__nanomolarity_millisecond; parameter_268 is "kf_SubstrateXpCaMKII_CaM_Ca4_psd__pCaMKII_CaM_Ca4_psd_Substrate";
  parameter_269 = 0.01 MWDERIVEDUNIT_1__millisecond; parameter_269 is "kr_SubstrateXpCaMKII_CaM_Ca4_psd__pCaMKII_CaM_Ca4_psd_Substrate";
  parameter_270 = 0.01 MWDERIVEDUNIT_1__millisecond; parameter_270 is "kf_pCaMKII_CaM_Ca4_psd_Substrate__pCaMKII_CaM_Ca4_psdXpSubstrate";
  kf_SubstrateXCaMKII_CaM_psd__CaMKII_CaM_psd_Substrate = 5e-7 MWDERIVEDUNIT_1__nanomolarity_millisecond;
  kr_SubstrateXCaMKII_CaM_psd__CaMKII_CaM_psd_Substrate = 0.01 MWDERIVEDUNIT_1__millisecond;
  kf_CaMKII_CaM_psd_Substrate__CaMKII_CaM_psdXpSubstrate = 0.01 MWDERIVEDUNIT_1__millisecond;
  parameter_274 = 5e-7 MWDERIVEDUNIT_1__nanomolarity_millisecond; parameter_274 is "kf_SubstrateXCaMKII_CaM_Ca2_psd__CaMKII_CaM_Ca2_psd_Substrate";
  parameter_275 = 0.01 MWDERIVEDUNIT_1__millisecond; parameter_275 is "kr_SubstrateXCaMKII_CaM_Ca2_psd__CaMKII_CaM_Ca2_psd_Substrate";
  parameter_276 = 0.01 MWDERIVEDUNIT_1__millisecond; parameter_276 is "kf_CaMKII_CaM_Ca2_psd_Substrate__CaMKII_CaM_Ca2_psdXpSubstrate";
  parameter_277 = 5e-7 MWDERIVEDUNIT_1__nanomolarity_millisecond; parameter_277 is "kf_SubstrateXCaMKII_CaM_Ca4_psd__CaMKII_CaM_Ca4_psd_Substrate";
  parameter_278 = 0.01 MWDERIVEDUNIT_1__millisecond; parameter_278 is "kr_SubstrateXCaMKII_CaM_Ca4_psd__CaMKII_CaM_Ca4_psd_Substrate";
  parameter_279 = 0.01 MWDERIVEDUNIT_1__millisecond; parameter_279 is "kf_CaMKII_CaM_Ca4_psd_Substrate__CaMKII_CaM_Ca4_psdXpSubstrate";
  kf_pCaMKII_CaM_Ca4__pCaMKII_CaM_Ca4_psd = 0.0005 MWDERIVEDUNIT_1__millisecond;
  kr_pCaMKII_CaM_Ca4__pCaMKII_CaM_Ca4_psd = 1e-6 MWDERIVEDUNIT_1__millisecond;
  kf_pCaMKII_CaM_Ca2__pCaMKII_CaM_Ca2_psd = 0.0005 MWDERIVEDUNIT_1__millisecond;
  kr_pCaMKII_CaM_Ca2__pCaMKII_CaM_Ca2_psd = 1e-6 MWDERIVEDUNIT_1__millisecond;
  kf_pCaMKII_CaM__pCaMKII_CaM_psd = 0.0005 MWDERIVEDUNIT_1__millisecond;
  kr_pCaMKII_CaM__pCaMKII_CaM_psd = 1e-6 MWDERIVEDUNIT_1__millisecond;
  kf_pCaMKII__pCaMKII_psd = 0.0005 MWDERIVEDUNIT_1__millisecond;
  kr_pCaMKII__pCaMKII_psd = 1e-6 MWDERIVEDUNIT_1__millisecond;
  kf_CaM_Ca4XpCaMKII_psd__pCaMKII_CaM_Ca4_psd = 0.0001 MWDERIVEDUNIT_1__nanomolarity_millisecond;
  kr_CaM_Ca4XpCaMKII_psd__pCaMKII_CaM_Ca4_psd = 0.0004 MWDERIVEDUNIT_1__millisecond;
  kf_pCaMKII_psdXCaM_Ca2__pCaMKII_CaM_Ca2_psd = 0.0001 MWDERIVEDUNIT_1__nanomolarity_millisecond;
  kr_pCaMKII_psdXCaM_Ca2__pCaMKII_CaM_Ca2_psd = 0.04 MWDERIVEDUNIT_1__millisecond;
  kf_CaMXpCaMKII_psd__pCaMKII_CaM_psd = 0.0001 MWDERIVEDUNIT_1__nanomolarity_millisecond;
  kr_CaMXpCaMKII_psd__pCaMKII_CaM_psd = 0.4 MWDERIVEDUNIT_1__millisecond;
  kf_pCaMKII_CaM_psdXCa__pCaMKII_CaM_Ca2_psd = 6e-6 MWDERIVEDUNIT_1__nanomolarity_millisecond;
  kr_pCaMKII_CaM_psdXCa__pCaMKII_CaM_Ca2_psd = 0.002 MWDERIVEDUNIT_1__millisecond;
  kf_pCaMKII_CaM_Ca2_psdXCa__pCaMKII_CaM_Ca4_psd = 0.0001 MWDERIVEDUNIT_1__nanomolarity_millisecond;
  kr_pCaMKII_CaM_Ca2_psdXCa__pCaMKII_CaM_Ca4_psd = 0.01 MWDERIVEDUNIT_1__millisecond;
  kf_pCaMKII_psdXPP1__PP1_pCaMKII_psd = 8e-7 MWDERIVEDUNIT_1__nanomolarity_millisecond;
  kr_pCaMKII_psdXPP1__PP1_pCaMKII_psd = 0.001 MWDERIVEDUNIT_1__millisecond;
  kf_PP1_pCaMKII_psd__PP1XCaMKII_psd = 0.001 MWDERIVEDUNIT_1__millisecond;
  kf_CaMKII_psd__CaMKII = 0.0005 MWDERIVEDUNIT_1__millisecond;
  kf_CaM_Ca4XCaMKII_psd__CaMKII_CaM_Ca4_psd = 0.0001 MWDERIVEDUNIT_1__nanomolarity_millisecond;
  kr_CaM_Ca4XCaMKII_psd__CaMKII_CaM_Ca4_psd = 0.04 MWDERIVEDUNIT_1__millisecond;
  kf_CaM_Ca2XCaMKII_psd__CaMKII_CaM_Ca2_psd = 0.0001 MWDERIVEDUNIT_1__nanomolarity_millisecond;
  kr_CaM_Ca2XCaMKII_psd__CaMKII_CaM_Ca2_psd = 0.4 MWDERIVEDUNIT_1__millisecond;
  kf_CaMXCaMKII_psd__CaMKII_CaM_psd = 0.0001 MWDERIVEDUNIT_1__nanomolarity_millisecond;
  kr_CaMXCaMKII_psd__CaMKII_CaM_psd = 4 MWDERIVEDUNIT_1__millisecond;
  kf_CaMKII_CaM_Ca2_psdXCa__CaMKII_CaM_Ca4_psd = 0.0001 MWDERIVEDUNIT_1__nanomolarity_millisecond;
  kr_CaMKII_CaM_Ca2_psdXCa__CaMKII_CaM_Ca4_psd = 0.1 MWDERIVEDUNIT_1__millisecond;
  kf_CaMKII_CaM_psdXCa__CaMKII_CaM_Ca2_psd = 6e-6 MWDERIVEDUNIT_1__nanomolarity_millisecond;
  kr_CaMKII_CaM_psdXCa__CaMKII_CaM_Ca2_psd = 0.002 MWDERIVEDUNIT_1__millisecond;
  kf_CaMKII_CaM__CaMKII_CaM_psd = 0.0005 MWDERIVEDUNIT_1__millisecond;
  kr_CaMKII_CaM__CaMKII_CaM_psd = 0.0005 MWDERIVEDUNIT_1__millisecond;
  kf_CaMKII_CaM_Ca2__CaMKII_CaM_Ca2_psd = 0.0005 MWDERIVEDUNIT_1__millisecond;
  kr_CaMKII_CaM_Ca2__CaMKII_CaM_Ca2_psd = 0.0005 MWDERIVEDUNIT_1__millisecond;
  kf_CaMKII_CaM_Ca4__CaMKII_CaM_Ca4_psd = 0.0005 MWDERIVEDUNIT_1__millisecond;
  kr_CaMKII_CaM_Ca4__CaMKII_CaM_Ca4_psd = 0.0005 MWDERIVEDUNIT_1__millisecond;
  parameter_318 = 0.0005 MWDERIVEDUNIT_1__millisecond; parameter_318 is "kf_CaMKII_CaM_Ca4_psd_CaMKII_CaM_Ca4_psd__CaMKII_CaM_Ca4_CaMKII_CaM_Ca4";
  parameter_319 = 0.0005 MWDERIVEDUNIT_1__millisecond; parameter_319 is "kr_CaMKII_CaM_Ca4_psd_CaMKII_CaM_Ca4_psd__CaMKII_CaM_Ca4_CaMKII_CaM_Ca4";
  parameter_320 = 1e-6 MWDERIVEDUNIT_1__millisecond; parameter_320 is "kf_pCaMKII_CaM_Ca4_psd_CaMKII_CaM_Ca4_psd__pCaMKII_CaM_Ca4_CaMKII_CaM_Ca4";
  parameter_321 = 0.0005 MWDERIVEDUNIT_1__millisecond; parameter_321 is "kr_pCaMKII_CaM_Ca4_psd_CaMKII_CaM_Ca4_psd__pCaMKII_CaM_Ca4_CaMKII_CaM_Ca4";
  parameter_322 = 5.7e-8 MWDERIVEDUNIT_1__nanomolarity_millisecond; parameter_322 is "kf_CaMKII_CaM_Ca4XCaMKII_CaM_Ca4__CaMKII_CaM_Ca4_CaMKII_CaM_Ca4";
  parameter_323 = 1.5e-5 MWDERIVEDUNIT_1__millisecond; parameter_323 is "kr_CaMKII_CaM_Ca4XCaMKII_CaM_Ca4__CaMKII_CaM_Ca4_CaMKII_CaM_Ca4";
  parameter_324 = 10 MWDERIVEDUNIT_1__millisecond; parameter_324 is "kf_CaMKII_CaM_Ca4_CaMKII_CaM_Ca4__pCaMKII_CaM_Ca4XCaMKII_CaM_Ca4";
  parameter_325 = 1.5e-6 MWDERIVEDUNIT_1__nanomolarity_millisecond; parameter_325 is "kf_pCaMKII_CaM_Ca4XCaMKII_CaM_Ca4__pCaMKII_CaM_Ca4_CaMKII_CaM_Ca4";
  parameter_326 = 2.3364 MWDERIVEDUNIT_1__millisecond; parameter_326 is "kr_pCaMKII_CaM_Ca4XCaMKII_CaM_Ca4__pCaMKII_CaM_Ca4_CaMKII_CaM_Ca4";
  parameter_327 = 3.7142 MWDERIVEDUNIT_1__millisecond; parameter_327 is "kf_pCaMKII_CaM_Ca4_CaMKII_CaM_Ca4__pCaMKII_CaM_Ca4XpCaMKII_CaM_Ca4";
  parameter_328 = 5.7e-8 MWDERIVEDUNIT_1__nanomolarity_millisecond; parameter_328 is "kf_CaMKII_CaM_Ca4_psdXCaMKII_CaM_Ca4_psd__CaMKII_CaM_Ca4_psd_CaMKII_CaM_Ca4_psd";
  parameter_329 = 1.5e-5 MWDERIVEDUNIT_1__millisecond; parameter_329 is "kr_CaMKII_CaM_Ca4_psdXCaMKII_CaM_Ca4_psd__CaMKII_CaM_Ca4_psd_CaMKII_CaM_Ca4_psd";
  parameter_330 = 10 MWDERIVEDUNIT_1__millisecond; parameter_330 is "kf_CaMKII_CaM_Ca4_psd_CaMKII_CaM_Ca4_psd__pCaMKII_CaM_Ca4_psdXCaMKII_CaM_Ca4_psd";
  parameter_331 = 1.5e-6 MWDERIVEDUNIT_1__nanomolarity_millisecond; parameter_331 is "kf_pCaMKII_CaM_Ca4_psdXCaMKII_CaM_Ca4_psd__pCaMKII_CaM_Ca4_psd_CaMKII_CaM_Ca4_psd";
  parameter_332 = 2.3364 MWDERIVEDUNIT_1__millisecond; parameter_332 is "kr_pCaMKII_CaM_Ca4_psdXCaMKII_CaM_Ca4_psd__pCaMKII_CaM_Ca4_psd_CaMKII_CaM_Ca4_psd";
  parameter_333 = 3.7142 MWDERIVEDUNIT_1__millisecond; parameter_333 is "kf_pCaMKII_CaM_Ca4_psd_CaMKII_CaM_Ca4_psd__pCaMKII_CaM_Ca4_psdXpCaMKII_CaM_Ca4_psd";
  DA_start = 100 MWBUILTINPREFIX_milli_MWBUILTINUNIT_second;
  tau_DA1 = 34.979 MWBUILTINPREFIX_milli_MWBUILTINUNIT_second;
  tau_DA2 = 420 MWBUILTINPREFIX_milli_MWBUILTINUNIT_second;

  // Assignment rules:
  DA_expression := DA_basal + 1/(1 + exp(-10e10*(time - DA_start)))*(DA_max/(exp(-tau_DA1*tau_DA2/(tau_DA2 - tau_DA1)*ln(tau_DA2/tau_DA1)/tau_DA1) - exp(-tau_DA1*tau_DA2/(tau_DA2 - tau_DA1)*ln(tau_DA2/tau_DA1)/tau_DA2)))*(exp(-(time - DA_start)/tau_DA1) - exp(-(time - DA_start)/tau_DA2));

  // Reactions:
  reaction_337: GaolfGTP => GaolfGDP; kf_GaolfGTP__GaolfGDP*GaolfGTP*Spine;
  reaction_338: D1R_Golf_DA => Gbgolf + D1R_DA + GaolfGTP; kf_D1R_Golf_DA__GbgolfXD1R_DAXGaolfGTP*D1R_Golf_DA*Spine;
  reaction_339: D1R_Golf + $DA -> D1R_Golf_DA; kf_D1R_GolfXDA__D1R_Golf_DA*D1R_Golf*DA*Spine - kr_D1R_GolfXDA__D1R_Golf_DA*D1R_Golf_DA*Spine;
  reaction_340: D1R + $DA -> D1R_DA; kf_D1RXDA__D1R_DA*D1R*DA*Spine - kr_D1RXDA__D1R_DA*D1R_DA*Spine;
  reaction_341: AC5 + GaolfGTP -> AC5_GaolfGTP; kf_AC5XGaolfGTP__AC5_GaolfGTP*AC5*GaolfGTP*Spine - kr_AC5XGaolfGTP__AC5_GaolfGTP*AC5_GaolfGTP*Spine;
  reaction_342: CaM + $Ca -> CaM_Ca2; kf_CaMXCa__CaM_Ca2*CaM*Ca*Spine - kr_CaMXCa__CaM_Ca2*CaM_Ca2*Spine;
  reaction_343: PP2B + CaM -> PP2B_CaM; kf_PP2BXCaM__PP2B_CaM*PP2B*CaM*Spine - kr_PP2BXCaM__PP2B_CaM*PP2B_CaM*Spine;
  reaction_344: CaM_Ca4 + PP2B -> PP2Bc; kf_CaM_Ca4XPP2B__PP2Bc*CaM_Ca4*PP2B*Spine - kr_CaM_Ca4XPP2B__PP2Bc*PP2Bc*Spine;
  reaction_345: PKAc + D32 -> PKAc_D32; kf_PKAcXD32__PKAc_D32*PKAc*D32*Spine - kr_PKAcXD32__PKAc_D32*PKAc_D32*Spine;
  reaction_346: PKAc_D32 => D32p34 + PKAc; kf_PKAc_D32__D32p34XPKAc*PKAc_D32*Spine;
  reaction_347: PKAc + B56PP2A -> PKAc_B56PP2A; kf_PKAcXB56PP2A__PKAc_B56PP2A*PKAc*B56PP2A*Spine - kr_PKAcXB56PP2A__PKAc_B56PP2A*PKAc_B56PP2A*Spine;
  reaction_348: PKAc_B56PP2A => B56PP2Ap + PKAc; kf_PKAc_B56PP2A__B56PP2ApXPKAc*PKAc_B56PP2A*Spine;
  reaction_349: D32p34 + PP1 -> PP1_D32p34; kf_D32p34XPP1__PP1_D32p34*D32p34*PP1*Spine - kr_D32p34XPP1__PP1_D32p34*PP1_D32p34*Spine;
  reaction_350: CDK5 + D32 -> CDK5_D32; kf_CDK5XD32__CDK5_D32*CDK5*D32*Spine - kr_CDK5XD32__CDK5_D32*CDK5_D32*Spine;
  reaction_351: CDK5_D32 => CDK5 + D32p75; kf_CDK5_D32__CDK5XD32p75*CDK5_D32*Spine;
  reaction_352: D32p75 + PKAc -> PKAc_D32p75; kf_D32p75XPKAc__PKAc_D32p75*D32p75*PKAc*Spine - kr_D32p75XPKAc__PKAc_D32p75*PKAc_D32p75*Spine;
  reaction_353: B72PP2A + $Ca -> B72PP2A_Ca; kf_B72PP2AXCa__B72PP2A_Ca*B72PP2A*Ca*Spine - kr_B72PP2AXCa__B72PP2A_Ca*B72PP2A_Ca*Spine;
  reaction_354: B56PP2Ap + D32p75 -> B56PP2Ap_D32p75; kf_B56PP2ApXD32p75__B56PP2Ap_D32p75*B56PP2Ap*D32p75*Spine - kr_B56PP2ApXD32p75__B56PP2Ap_D32p75*B56PP2Ap_D32p75*Spine;
  reaction_355: B72PP2A + D32p75 -> B72PP2A_D32p75; kf_B72PP2AXD32p75__B72PP2A_D32p75*B72PP2A*D32p75*Spine - kr_B72PP2AXD32p75__B72PP2A_D32p75*B72PP2A_D32p75*Spine;
  reaction_356: D32p75 + B72PP2A_Ca -> B72PP2A_Ca_D32p75; kf_D32p75XB72PP2A_Ca__B72PP2A_Ca_D32p75*D32p75*B72PP2A_Ca*Spine - kr_D32p75XB72PP2A_Ca__B72PP2A_Ca_D32p75*B72PP2A_Ca_D32p75*Spine;
  reaction_357: B56PP2Ap_D32p75 => B56PP2Ap + D32; kf_B56PP2Ap_D32p75__B56PP2ApXD32*B56PP2Ap_D32p75*Spine;
  reaction_358: B72PP2A_D32p75 => B72PP2A + D32; kf_B72PP2A_D32p75__B72PP2AXD32*B72PP2A_D32p75*Spine;
  reaction_359: B72PP2A_Ca_D32p75 => B72PP2A_Ca + D32; kf_B72PP2A_Ca_D32p75__B72PP2A_CaXD32*B72PP2A_Ca_D32p75*Spine;
  reaction_360: D32p34 + PP2Bc -> PP2Bc_D32p34; kf_D32p34XPP2Bc__PP2Bc_D32p34*D32p34*PP2Bc*Spine - kr_D32p34XPP2Bc__PP2Bc_D32p34*PP2Bc_D32p34*Spine;
  reaction_361: CaM_Ca2 + $Ca -> CaM_Ca4; kf_CaM_Ca2XCa__CaM_Ca4*CaM_Ca2*Ca*Spine - kr_CaM_Ca2XCa__CaM_Ca4*CaM_Ca4*Spine;
  reaction_362: $Ca + PP2B_CaM -> PP2B_CaM_Ca2; kf_CaXPP2B_CaM__PP2B_CaM_Ca2*Ca*PP2B_CaM*Spine - kr_CaXPP2B_CaM__PP2B_CaM_Ca2*PP2B_CaM_Ca2*Spine;
  reaction_363: $Ca + PP2B_CaM_Ca2 -> PP2Bc; kf_CaXPP2B_CaM_Ca2__PP2Bc*Ca*PP2B_CaM_Ca2*Spine - kr_CaXPP2B_CaM_Ca2__PP2Bc*PP2Bc*Spine;
  reaction_364: CaM_Ca2 + PP2B -> PP2B_CaM_Ca2; kf_CaM_Ca2XPP2B__PP2B_CaM_Ca2*CaM_Ca2*PP2B*Spine - kr_CaM_Ca2XPP2B__PP2B_CaM_Ca2*PP2B_CaM_Ca2*Spine;
  reaction_365: AC5 + $Ca -> AC5_Ca; kf_AC5XCa__AC5_Ca*AC5*Ca*Spine - kr_AC5XCa__AC5_Ca*AC5_Ca*Spine;
  reaction_366: AC5_Ca + GaolfGTP -> AC5_Ca_GaolfGTP; kf_AC5_CaXGaolfGTP__AC5_Ca_GaolfGTP*AC5_Ca*GaolfGTP*Spine - kr_AC5_CaXGaolfGTP__AC5_Ca_GaolfGTP*AC5_Ca_GaolfGTP*Spine;
  reaction_367: D32p75 + B56PP2A -> B56PP2A_D32p75; kf_D32p75XB56PP2A__B56PP2A_D32p75*D32p75*B56PP2A*Spine - kr_D32p75XB56PP2A__B56PP2A_D32p75*B56PP2A_D32p75*Spine;
  reaction_368: B56PP2A_D32p75 => B56PP2A + D32; kf_B56PP2A_D32p75__B56PP2AXD32*B56PP2A_D32p75*Spine;
  reaction_369: B72PP2A_Ca_D32p34 => B72PP2A_Ca + D32; kf_B72PP2A_Ca_D32p34__B72PP2A_CaXD32*B72PP2A_Ca_D32p34*Spine;
  reaction_370: B72PP2A_D32p34 => D32 + B72PP2A; kf_B72PP2A_D32p34__D32XB72PP2A*B72PP2A_D32p34*Spine;
  reaction_371: D32p34 + B72PP2A_Ca -> B72PP2A_Ca_D32p34; kf_D32p34XB72PP2A_Ca__B72PP2A_Ca_D32p34*D32p34*B72PP2A_Ca*Spine - kr_D32p34XB72PP2A_Ca__B72PP2A_Ca_D32p34*B72PP2A_Ca_D32p34*Spine;
  reaction_372: D32p34 + B72PP2A -> B72PP2A_D32p34; kf_D32p34XB72PP2A__B72PP2A_D32p34*D32p34*B72PP2A*Spine - kr_D32p34XB72PP2A__B72PP2A_D32p34*B72PP2A_D32p34*Spine;
  reaction_373: PP2Bc_D32p34 => D32 + PP2Bc; kf_PP2Bc_D32p34__D32XPP2Bc*PP2Bc_D32p34*Spine;
  reaction_374: B56PP2Ap => B56PP2A; kf_B56PP2Ap__B56PP2A*B56PP2Ap*Spine;
  reaction_375: cAMP + PKA -> PKA_Ca2MP; kf_cAMPXPKA__PKA_Ca2MP*cAMP*PKA*Spine - kr_cAMPXPKA__PKA_Ca2MP*PKA_Ca2MP*Spine;
  reaction_376: cAMP + PKA_Ca2MP -> PKA_Ca4MP; kf_cAMPXPKA_Ca2MP__PKA_Ca4MP*cAMP*PKA_Ca2MP*Spine - kr_cAMPXPKA_Ca2MP__PKA_Ca4MP*PKA_Ca4MP*Spine;
  reaction_377: PKA_Ca4MP -> PKAc + PKAreg; kf_PKA_Ca4MP__PKAcXPKAreg*PKA_Ca4MP*Spine - kr_PKA_Ca4MP__PKAcXPKAreg*PKAc*PKAreg*Spine;
  reaction_378: cAMP + PDE4 -> PDE4_cAMP; kf_cAMPXPDE4__PDE4_cAMP*cAMP*PDE4*Spine - kr_cAMPXPDE4__PDE4_cAMP*PDE4_cAMP*Spine;
  reaction_379: PDE4_cAMP => PDE4 + $AMP; kf_PDE4_cAMP__PDE4XAMP*PDE4_cAMP*Spine;
  reaction_380: PDE10r + 2 cAMP -> PDE10c; kf_PDE10rX2_cAMP__PDE10c*PDE10r*cAMP^2*Spine - kr_PDE10rX2_cAMP__PDE10c*PDE10c*Spine;
  reaction_381: PDE10r_cAMP => PDE10r + $AMP; kf_PDE10r_cAMP__PDE10rXAMP*PDE10r_cAMP*Spine;
  reaction_382: cAMP + PDE10r -> PDE10r_cAMP; kf_cAMPXPDE10r__PDE10r_cAMP*cAMP*PDE10r*Spine - kr_cAMPXPDE10r__PDE10r_cAMP*PDE10r_cAMP*Spine;
  reaction_383: PDE10c_cAMP => PDE10c + $AMP; kf_PDE10c_cAMP__PDE10cXAMP*PDE10c_cAMP*Spine;
  reaction_384: GaolfGDP + Gbgolf => Golf; kf_GaolfGDPXGbgolf__Golf*GaolfGDP*Gbgolf*Spine;
  reaction_385: AC5_GaolfGTP + $ATP -> AC5_GaolfGTP_ATP; kf_AC5_GaolfGTPXATP__AC5_GaolfGTP_ATP*AC5_GaolfGTP*ATP*Spine - kr_AC5_GaolfGTPXATP__AC5_GaolfGTP_ATP*AC5_GaolfGTP_ATP*Spine;
  reaction_386: AC5 + $ATP -> AC5_ATP; kf_AC5XATP__AC5_ATP*AC5*ATP*Spine - kr_AC5XATP__AC5_ATP*AC5_ATP*Spine;
  reaction_387: AC5_Ca + $ATP -> AC5_Ca_ATP; kf_AC5_CaXATP__AC5_Ca_ATP*AC5_Ca*ATP*Spine - kr_AC5_CaXATP__AC5_Ca_ATP*AC5_Ca_ATP*Spine;
  reaction_388: AC5_Ca_GaolfGTP + $ATP -> AC5_Ca_GaolfGTP_ATP; kf_AC5_Ca_GaolfGTPXATP__AC5_Ca_GaolfGTP_ATP*AC5_Ca_GaolfGTP*ATP*Spine - kr_AC5_Ca_GaolfGTPXATP__AC5_Ca_GaolfGTP_ATP*AC5_Ca_GaolfGTP_ATP*Spine;
  reaction_389: GaolfGTP + AC5_ATP -> AC5_GaolfGTP_ATP; kf_GaolfGTPXAC5_ATP__AC5_GaolfGTP_ATP*GaolfGTP*AC5_ATP*Spine - kr_GaolfGTPXAC5_ATP__AC5_GaolfGTP_ATP*AC5_GaolfGTP_ATP*Spine;
  reaction_390: GaolfGTP + AC5_Ca_ATP -> AC5_Ca_GaolfGTP_ATP; kf_GaolfGTPXAC5_Ca_ATP__AC5_Ca_GaolfGTP_ATP*GaolfGTP*AC5_Ca_ATP*Spine - kr_GaolfGTPXAC5_Ca_ATP__AC5_Ca_GaolfGTP_ATP*AC5_Ca_GaolfGTP_ATP*Spine;
  reaction_391: $Ca + AC5_ATP -> AC5_Ca_ATP; kf_CaXAC5_ATP__AC5_Ca_ATP*Ca*AC5_ATP*Spine - kr_CaXAC5_ATP__AC5_Ca_ATP*AC5_Ca_ATP*Spine;
  reaction_392: AC5_GaolfGTP_ATP => cAMP + AC5_GaolfGTP; kf_AC5_GaolfGTP_ATP__cAMPXAC5_GaolfGTP*AC5_GaolfGTP_ATP*Spine;
  reaction_393: cAMP + AC5_GaolfGTP => AC5_GaolfGTP_ATP; kf_cAMPXAC5_GaolfGTP__AC5_GaolfGTP_ATP*cAMP*AC5_GaolfGTP*Spine;
  reaction_394: AC5_ATP => cAMP + AC5; kf_AC5_ATP__cAMPXAC5*AC5_ATP*Spine;
  reaction_395: cAMP + AC5 => AC5_ATP; kf_cAMPXAC5__AC5_ATP*cAMP*AC5*Spine;
  reaction_396: AC5_Ca_ATP => cAMP + AC5_Ca; kf_AC5_Ca_ATP__cAMPXAC5_Ca*AC5_Ca_ATP*Spine;
  reaction_397: cAMP + AC5_Ca => AC5_Ca_ATP; kf_cAMPXAC5_Ca__AC5_Ca_ATP*cAMP*AC5_Ca*Spine;
  reaction_398: AC5_Ca_GaolfGTP_ATP => cAMP + AC5_Ca_GaolfGTP; kf_AC5_Ca_GaolfGTP_ATP__cAMPXAC5_Ca_GaolfGTP*AC5_Ca_GaolfGTP_ATP*Spine;
  reaction_399: cAMP + AC5_Ca_GaolfGTP => AC5_Ca_GaolfGTP_ATP; kf_cAMPXAC5_Ca_GaolfGTP__AC5_Ca_GaolfGTP_ATP*cAMP*AC5_Ca_GaolfGTP*Spine;
  reaction_400: AC5_GaolfGTP => AC5 + GaolfGDP; kf_AC5_GaolfGTP__AC5XGaolfGDP*AC5_GaolfGTP*Spine;
  reaction_401: AC5_Ca_GaolfGTP => AC5_Ca + GaolfGDP; kf_AC5_Ca_GaolfGTP__AC5_CaXGaolfGDP*AC5_Ca_GaolfGTP*Spine;
  reaction_402: AC5_GaolfGTP_ATP => AC5_ATP + GaolfGDP; kf_AC5_GaolfGTP_ATP__AC5_ATPXGaolfGDP*AC5_GaolfGTP_ATP*Spine;
  reaction_403: AC5_Ca_GaolfGTP_ATP => AC5_Ca_ATP + GaolfGDP; kf_AC5_Ca_GaolfGTP_ATP__AC5_Ca_ATPXGaolfGDP*AC5_Ca_GaolfGTP_ATP*Spine;
  reaction_404: D1R + Golf -> D1R_Golf; kf_D1RXGolf__D1R_Golf*D1R*Golf*Spine - kr_D1RXGolf__D1R_Golf*D1R_Golf*Spine;
  reaction_405: Golf + D1R_DA -> D1R_Golf_DA; kf_GolfXD1R_DA__D1R_Golf_DA*Golf*D1R_DA*Spine - kr_GolfXD1R_DA__D1R_Golf_DA*D1R_Golf_DA*Spine;
  reaction_406: cAMP + PDE10c -> PDE10c_cAMP; kf_cAMPXPDE10c__PDE10c_cAMP*cAMP*PDE10c*Spine - kr_cAMPXPDE10c__PDE10c_cAMP*PDE10c_cAMP*Spine;
  reaction_407: CaMKII + CaM_Ca4 -> CaMKII_CaM_Ca4; kf_CaMKIIXCaM_Ca4__CaMKII_CaM_Ca4*CaMKII*CaM_Ca4*Spine - kr_CaMKIIXCaM_Ca4__CaMKII_CaM_Ca4*CaMKII_CaM_Ca4*Spine;
  reaction_408: CaM_Ca2 + CaMKII -> CaMKII_CaM_Ca2; kf_CaM_Ca2XCaMKII__CaMKII_CaM_Ca2*CaM_Ca2*CaMKII*Spine - kr_CaM_Ca2XCaMKII__CaMKII_CaM_Ca2*CaMKII_CaM_Ca2*Spine;
  reaction_409: CaM + CaMKII -> CaMKII_CaM; kf_CaMXCaMKII__CaMKII_CaM*CaM*CaMKII*Spine - kr_CaMXCaMKII__CaMKII_CaM*CaMKII_CaM*Spine;
  reaction_410: CaMKII_CaM_Ca2 + $Ca -> CaMKII_CaM_Ca4; kf_CaMKII_CaM_Ca2XCa__CaMKII_CaM_Ca4*CaMKII_CaM_Ca2*Ca*Spine - kr_CaMKII_CaM_Ca2XCa__CaMKII_CaM_Ca4*CaMKII_CaM_Ca4*Spine;
  reaction_411: CaMKII_CaM + $Ca -> CaMKII_CaM_Ca2; kf_CaMKII_CaMXCa__CaMKII_CaM_Ca2*CaMKII_CaM*Ca*Spine - kr_CaMKII_CaMXCa__CaMKII_CaM_Ca2*CaMKII_CaM_Ca2*Spine;
  reaction_412: pCaMKII_CaM_Ca2 + $Ca -> pCaMKII_CaM_Ca4; kf_pCaMKII_CaM_Ca2XCa__pCaMKII_CaM_Ca4*pCaMKII_CaM_Ca2*Ca*Spine - kr_pCaMKII_CaM_Ca2XCa__pCaMKII_CaM_Ca4*pCaMKII_CaM_Ca4*Spine;
  reaction_413: pCaMKII_CaM + $Ca -> pCaMKII_CaM_Ca2; kf_pCaMKII_CaMXCa__pCaMKII_CaM_Ca2*pCaMKII_CaM*Ca*Spine - kr_pCaMKII_CaMXCa__pCaMKII_CaM_Ca2*pCaMKII_CaM_Ca2*Spine;
  reaction_414: pCaMKII + CaM_Ca4 -> pCaMKII_CaM_Ca4; kf_pCaMKIIXCaM_Ca4__pCaMKII_CaM_Ca4*pCaMKII*CaM_Ca4*Spine - kr_pCaMKIIXCaM_Ca4__pCaMKII_CaM_Ca4*pCaMKII_CaM_Ca4*Spine;
  reaction_415: pCaMKII + CaM_Ca2 -> pCaMKII_CaM_Ca2; kf_pCaMKIIXCaM_Ca2__pCaMKII_CaM_Ca2*pCaMKII*CaM_Ca2*Spine - kr_pCaMKIIXCaM_Ca2__pCaMKII_CaM_Ca2*pCaMKII_CaM_Ca2*Spine;
  reaction_416: pCaMKII + CaM -> pCaMKII_CaM; kf_pCaMKIIXCaM__pCaMKII_CaM*pCaMKII*CaM*Spine - kr_pCaMKIIXCaM__pCaMKII_CaM*pCaMKII_CaM*Spine;
  reaction_417: ARPP21 + PKAc -> PKAc_ARPP21; kf_ARPP21XPKAc__PKAc_ARPP21*ARPP21*PKAc*Spine - kr_ARPP21XPKAc__PKAc_ARPP21*PKAc_ARPP21*Spine;
  reaction_418: PKAc_ARPP21 => PKAc + pARPP21; kf_PKAc_ARPP21__PKAcXpARPP21*PKAc_ARPP21*Spine;
  reaction_419: pARPP21 + CaM_Ca4 -> CaM_Ca4_pARPP21; kf_pARPP21XCaM_Ca4__CaM_Ca4_pARPP21*pARPP21*CaM_Ca4*Spine - kr_pARPP21XCaM_Ca4__CaM_Ca4_pARPP21*CaM_Ca4_pARPP21*Spine;
  reaction_420: B72PP2A_Ca_pARPP21 => ARPP21 + B72PP2A_Ca; kf_B72PP2A_Ca_pARPP21__ARPP21XB72PP2A_Ca*B72PP2A_Ca_pARPP21*Spine;
  reaction_421: pARPP21 + B72PP2A_Ca -> B72PP2A_Ca_pARPP21; kf_pARPP21XB72PP2A_Ca__B72PP2A_Ca_pARPP21*pARPP21*B72PP2A_Ca*Spine - kr_pARPP21XB72PP2A_Ca__B72PP2A_Ca_pARPP21*B72PP2A_Ca_pARPP21*Spine;
  reaction_422: B72PP2A_pARPP21 => ARPP21 + B72PP2A; kf_B72PP2A_pARPP21__ARPP21XB72PP2A*B72PP2A_pARPP21*Spine;
  reaction_423: pARPP21 + B72PP2A -> B72PP2A_pARPP21; kf_pARPP21XB72PP2A__B72PP2A_pARPP21*pARPP21*B72PP2A*Spine - kr_pARPP21XB72PP2A__B72PP2A_pARPP21*B72PP2A_pARPP21*Spine;
  reaction_424: B56PP2Ap_pARPP21 => ARPP21 + B56PP2Ap; kf_B56PP2Ap_pARPP21__ARPP21XB56PP2Ap*B56PP2Ap_pARPP21*Spine;
  reaction_425: pARPP21 + B56PP2Ap -> B56PP2Ap_pARPP21; kf_pARPP21XB56PP2Ap__B56PP2Ap_pARPP21*pARPP21*B56PP2Ap*Spine - kr_pARPP21XB56PP2Ap__B56PP2Ap_pARPP21*B56PP2Ap_pARPP21*Spine;
  reaction_426: B56PP2A_pARPP21 => ARPP21 + B56PP2A; kf_B56PP2A_pARPP21__ARPP21XB56PP2A*B56PP2A_pARPP21*Spine;
  reaction_427: pARPP21 + B56PP2A -> B56PP2A_pARPP21; kf_pARPP21XB56PP2A__B56PP2A_pARPP21*pARPP21*B56PP2A*Spine - kr_pARPP21XB56PP2A__B56PP2A_pARPP21*B56PP2A_pARPP21*Spine;
  reaction_428: pSubstrate + PP1 -> PP1_pSubstrate; kf_pSubstrateXPP1__PP1_pSubstrate*pSubstrate*PP1*Spine - kr_pSubstrateXPP1__PP1_pSubstrate*PP1_pSubstrate*Spine;
  reaction_429: PP1_pSubstrate => PP1 + Substrate; kf_PP1_pSubstrate__PP1XSubstrate*PP1_pSubstrate*Spine;
  reaction_430: Substrate + pCaMKII_psd -> pCaMKII_psd_Substrate; kf_SubstrateXpCaMKII_psd__pCaMKII_psd_Substrate*Substrate*pCaMKII_psd*Spine - kr_SubstrateXpCaMKII_psd__pCaMKII_psd_Substrate*pCaMKII_psd_Substrate*Spine;
  reaction_431: pCaMKII_psd_Substrate => pCaMKII_psd + pSubstrate; kf_pCaMKII_psd_Substrate__pCaMKII_psdXpSubstrate*pCaMKII_psd_Substrate*Spine;
  reaction_432: pCaMKII => CaMKII; kf_pCaMKII__CaMKII*pCaMKII*Spine;
  reaction_433: Substrate + pCaMKII_CaM_psd -> pCaMKII_CaM_psd_Substrate; kf_SubstrateXpCaMKII_CaM_psd__pCaMKII_CaM_psd_Substrate*Substrate*pCaMKII_CaM_psd*Spine - kr_SubstrateXpCaMKII_CaM_psd__pCaMKII_CaM_psd_Substrate*pCaMKII_CaM_psd_Substrate*Spine;
  reaction_434: pCaMKII_CaM_psd_Substrate => pCaMKII_CaM_psd + pSubstrate; kf_pCaMKII_CaM_psd_Substrate__pCaMKII_CaM_psdXpSubstrate*pCaMKII_CaM_psd_Substrate*Spine;
  reaction_435: Substrate + pCaMKII_CaM_Ca2_psd -> pCaMKII_CaM_Ca2_psd_Substrate; parameter_265*Substrate*pCaMKII_CaM_Ca2_psd*Spine - parameter_266*pCaMKII_CaM_Ca2_psd_Substrate*Spine;
  reaction_436: pCaMKII_CaM_Ca2_psd_Substrate => pCaMKII_CaM_Ca2_psd + pSubstrate; parameter_267*pCaMKII_CaM_Ca2_psd_Substrate*Spine;
  reaction_437: Substrate + pCaMKII_CaM_Ca4_psd -> pCaMKII_CaM_Ca4_psd_Substrate; parameter_268*Substrate*pCaMKII_CaM_Ca4_psd*Spine - parameter_269*pCaMKII_CaM_Ca4_psd_Substrate*Spine;
  reaction_438: pCaMKII_CaM_Ca4_psd_Substrate => pCaMKII_CaM_Ca4_psd + pSubstrate; parameter_270*pCaMKII_CaM_Ca4_psd_Substrate*Spine;
  reaction_439: Substrate + CaMKII_CaM_psd -> CaMKII_CaM_psd_Substrate; kf_SubstrateXCaMKII_CaM_psd__CaMKII_CaM_psd_Substrate*Substrate*CaMKII_CaM_psd*Spine - kr_SubstrateXCaMKII_CaM_psd__CaMKII_CaM_psd_Substrate*CaMKII_CaM_psd_Substrate*Spine;
  reaction_440: CaMKII_CaM_psd_Substrate => CaMKII_CaM_psd + pSubstrate; kf_CaMKII_CaM_psd_Substrate__CaMKII_CaM_psdXpSubstrate*CaMKII_CaM_psd_Substrate*Spine;
  reaction_441: Substrate + CaMKII_CaM_Ca2_psd -> CaMKII_CaM_Ca2_psd_Substrate; parameter_274*Substrate*CaMKII_CaM_Ca2_psd*Spine - parameter_275*CaMKII_CaM_Ca2_psd_Substrate*Spine;
  reaction_442: CaMKII_CaM_Ca2_psd_Substrate => CaMKII_CaM_Ca2_psd + pSubstrate; parameter_276*CaMKII_CaM_Ca2_psd_Substrate*Spine;
  reaction_443: Substrate + CaMKII_CaM_Ca4_psd -> CaMKII_CaM_Ca4_psd_Substrate; parameter_277*Substrate*CaMKII_CaM_Ca4_psd*Spine - parameter_278*CaMKII_CaM_Ca4_psd_Substrate*Spine;
  reaction_444: CaMKII_CaM_Ca4_psd_Substrate => CaMKII_CaM_Ca4_psd + pSubstrate; parameter_279*CaMKII_CaM_Ca4_psd_Substrate*Spine;
  reaction_445: pCaMKII_CaM_Ca4 -> pCaMKII_CaM_Ca4_psd; kf_pCaMKII_CaM_Ca4__pCaMKII_CaM_Ca4_psd*pCaMKII_CaM_Ca4*Spine - kr_pCaMKII_CaM_Ca4__pCaMKII_CaM_Ca4_psd*pCaMKII_CaM_Ca4_psd*Spine;
  reaction_446: pCaMKII_CaM_Ca2 -> pCaMKII_CaM_Ca2_psd; kf_pCaMKII_CaM_Ca2__pCaMKII_CaM_Ca2_psd*pCaMKII_CaM_Ca2*Spine - kr_pCaMKII_CaM_Ca2__pCaMKII_CaM_Ca2_psd*pCaMKII_CaM_Ca2_psd*Spine;
  reaction_447: pCaMKII_CaM -> pCaMKII_CaM_psd; kf_pCaMKII_CaM__pCaMKII_CaM_psd*pCaMKII_CaM*Spine - kr_pCaMKII_CaM__pCaMKII_CaM_psd*pCaMKII_CaM_psd*Spine;
  reaction_448: pCaMKII -> pCaMKII_psd; kf_pCaMKII__pCaMKII_psd*pCaMKII*Spine - kr_pCaMKII__pCaMKII_psd*pCaMKII_psd*Spine;
  reaction_449: CaM_Ca4 + pCaMKII_psd -> pCaMKII_CaM_Ca4_psd; kf_CaM_Ca4XpCaMKII_psd__pCaMKII_CaM_Ca4_psd*CaM_Ca4*pCaMKII_psd*Spine - kr_CaM_Ca4XpCaMKII_psd__pCaMKII_CaM_Ca4_psd*pCaMKII_CaM_Ca4_psd*Spine;
  reaction_450: pCaMKII_psd + CaM_Ca2 -> pCaMKII_CaM_Ca2_psd; kf_pCaMKII_psdXCaM_Ca2__pCaMKII_CaM_Ca2_psd*pCaMKII_psd*CaM_Ca2*Spine - kr_pCaMKII_psdXCaM_Ca2__pCaMKII_CaM_Ca2_psd*pCaMKII_CaM_Ca2_psd*Spine;
  reaction_451: CaM + pCaMKII_psd -> pCaMKII_CaM_psd; kf_CaMXpCaMKII_psd__pCaMKII_CaM_psd*CaM*pCaMKII_psd*Spine - kr_CaMXpCaMKII_psd__pCaMKII_CaM_psd*pCaMKII_CaM_psd*Spine;
  reaction_452: pCaMKII_CaM_psd + $Ca -> pCaMKII_CaM_Ca2_psd; kf_pCaMKII_CaM_psdXCa__pCaMKII_CaM_Ca2_psd*pCaMKII_CaM_psd*Ca*Spine - kr_pCaMKII_CaM_psdXCa__pCaMKII_CaM_Ca2_psd*pCaMKII_CaM_Ca2_psd*Spine;
  reaction_453: pCaMKII_CaM_Ca2_psd + $Ca -> pCaMKII_CaM_Ca4_psd; kf_pCaMKII_CaM_Ca2_psdXCa__pCaMKII_CaM_Ca4_psd*pCaMKII_CaM_Ca2_psd*Ca*Spine - kr_pCaMKII_CaM_Ca2_psdXCa__pCaMKII_CaM_Ca4_psd*pCaMKII_CaM_Ca4_psd*Spine;
  reaction_454: pCaMKII_psd + PP1 -> PP1_pCaMKII_psd; kf_pCaMKII_psdXPP1__PP1_pCaMKII_psd*pCaMKII_psd*PP1*Spine - kr_pCaMKII_psdXPP1__PP1_pCaMKII_psd*PP1_pCaMKII_psd*Spine;
  reaction_455: PP1_pCaMKII_psd => PP1 + CaMKII_psd; kf_PP1_pCaMKII_psd__PP1XCaMKII_psd*PP1_pCaMKII_psd*Spine;
  reaction_456: CaMKII_psd => CaMKII; kf_CaMKII_psd__CaMKII*CaMKII_psd*Spine;
  reaction_457: CaM_Ca4 + CaMKII_psd -> CaMKII_CaM_Ca4_psd; kf_CaM_Ca4XCaMKII_psd__CaMKII_CaM_Ca4_psd*CaM_Ca4*CaMKII_psd*Spine - kr_CaM_Ca4XCaMKII_psd__CaMKII_CaM_Ca4_psd*CaMKII_CaM_Ca4_psd*Spine;
  reaction_458: CaM_Ca2 + CaMKII_psd -> CaMKII_CaM_Ca2_psd; kf_CaM_Ca2XCaMKII_psd__CaMKII_CaM_Ca2_psd*CaM_Ca2*CaMKII_psd*Spine - kr_CaM_Ca2XCaMKII_psd__CaMKII_CaM_Ca2_psd*CaMKII_CaM_Ca2_psd*Spine;
  reaction_459: CaM + CaMKII_psd -> CaMKII_CaM_psd; kf_CaMXCaMKII_psd__CaMKII_CaM_psd*CaM*CaMKII_psd*Spine - kr_CaMXCaMKII_psd__CaMKII_CaM_psd*CaMKII_CaM_psd*Spine;
  reaction_460: CaMKII_CaM_Ca2_psd + $Ca -> CaMKII_CaM_Ca4_psd; kf_CaMKII_CaM_Ca2_psdXCa__CaMKII_CaM_Ca4_psd*CaMKII_CaM_Ca2_psd*Ca*Spine - kr_CaMKII_CaM_Ca2_psdXCa__CaMKII_CaM_Ca4_psd*CaMKII_CaM_Ca4_psd*Spine;
  reaction_461: CaMKII_CaM_psd + $Ca -> CaMKII_CaM_Ca2_psd; kf_CaMKII_CaM_psdXCa__CaMKII_CaM_Ca2_psd*CaMKII_CaM_psd*Ca*Spine - kr_CaMKII_CaM_psdXCa__CaMKII_CaM_Ca2_psd*CaMKII_CaM_Ca2_psd*Spine;
  reaction_462: CaMKII_CaM -> CaMKII_CaM_psd; kf_CaMKII_CaM__CaMKII_CaM_psd*CaMKII_CaM*Spine - kr_CaMKII_CaM__CaMKII_CaM_psd*CaMKII_CaM_psd*Spine;
  reaction_463: CaMKII_CaM_Ca2 -> CaMKII_CaM_Ca2_psd; kf_CaMKII_CaM_Ca2__CaMKII_CaM_Ca2_psd*CaMKII_CaM_Ca2*Spine - kr_CaMKII_CaM_Ca2__CaMKII_CaM_Ca2_psd*CaMKII_CaM_Ca2_psd*Spine;
  reaction_464: CaMKII_CaM_Ca4 -> CaMKII_CaM_Ca4_psd; kf_CaMKII_CaM_Ca4__CaMKII_CaM_Ca4_psd*CaMKII_CaM_Ca4*Spine - kr_CaMKII_CaM_Ca4__CaMKII_CaM_Ca4_psd*CaMKII_CaM_Ca4_psd*Spine;
  reaction_465: CaMKII_CaM_Ca4_psd_CaMKII_CaM_Ca4_psd -> CaMKII_CaM_Ca4_CaMKII_CaM_Ca4; parameter_318*CaMKII_CaM_Ca4_psd_CaMKII_CaM_Ca4_psd*Spine - parameter_319*CaMKII_CaM_Ca4_CaMKII_CaM_Ca4*Spine;
  reaction_466: pCaMKII_CaM_Ca4_psd_CaMKII_CaM_Ca4_psd -> pCaMKII_CaM_Ca4_CaMKII_CaM_Ca4; parameter_320*pCaMKII_CaM_Ca4_psd_CaMKII_CaM_Ca4_psd*Spine - parameter_321*pCaMKII_CaM_Ca4_CaMKII_CaM_Ca4*Spine;
  reaction_467: CaMKII_CaM_Ca4 + CaMKII_CaM_Ca4 -> CaMKII_CaM_Ca4_CaMKII_CaM_Ca4; parameter_322*CaMKII_CaM_Ca4*CaMKII_CaM_Ca4*Spine - parameter_323*CaMKII_CaM_Ca4_CaMKII_CaM_Ca4*Spine;
  reaction_468: CaMKII_CaM_Ca4_CaMKII_CaM_Ca4 => pCaMKII_CaM_Ca4 + CaMKII_CaM_Ca4; parameter_324*CaMKII_CaM_Ca4_CaMKII_CaM_Ca4*Spine;
  reaction_469: pCaMKII_CaM_Ca4 + CaMKII_CaM_Ca4 -> pCaMKII_CaM_Ca4_CaMKII_CaM_Ca4; parameter_325*pCaMKII_CaM_Ca4*CaMKII_CaM_Ca4*Spine - parameter_326*pCaMKII_CaM_Ca4_CaMKII_CaM_Ca4*Spine;
  reaction_470: pCaMKII_CaM_Ca4_CaMKII_CaM_Ca4 => pCaMKII_CaM_Ca4 + pCaMKII_CaM_Ca4; parameter_327*pCaMKII_CaM_Ca4_CaMKII_CaM_Ca4*Spine;
  reaction_471: CaMKII_CaM_Ca4_psd + CaMKII_CaM_Ca4_psd -> CaMKII_CaM_Ca4_psd_CaMKII_CaM_Ca4_psd; parameter_328*CaMKII_CaM_Ca4_psd*CaMKII_CaM_Ca4_psd*Spine - parameter_329*CaMKII_CaM_Ca4_psd_CaMKII_CaM_Ca4_psd*Spine;
  reaction_472: CaMKII_CaM_Ca4_psd_CaMKII_CaM_Ca4_psd => pCaMKII_CaM_Ca4_psd + CaMKII_CaM_Ca4_psd; parameter_330*CaMKII_CaM_Ca4_psd_CaMKII_CaM_Ca4_psd*Spine;
  reaction_473: pCaMKII_CaM_Ca4_psd + CaMKII_CaM_Ca4_psd -> pCaMKII_CaM_Ca4_psd_CaMKII_CaM_Ca4_psd; parameter_331*pCaMKII_CaM_Ca4_psd*CaMKII_CaM_Ca4_psd*Spine - parameter_332*pCaMKII_CaM_Ca4_psd_CaMKII_CaM_Ca4_psd*Spine;
  reaction_474: pCaMKII_CaM_Ca4_psd_CaMKII_CaM_Ca4_psd => pCaMKII_CaM_Ca4_psd + pCaMKII_CaM_Ca4_psd; parameter_333*pCaMKII_CaM_Ca4_psd_CaMKII_CaM_Ca4_psd*Spine;

  // Unit definitions:
  unit MWBUILTINUNIT_liter = metre^3 * 1e-3 dimensionless;
  unit MWDERIVEDUNIT_1__millisecond = 1000 dimensionless / second; MWDERIVEDUNIT_1__millisecond is "1/millisecond";
  unit MWDERIVEDUNIT_1__nanomolarity_millisecond = metre^3 * 1e9 dimensionless / (mole * second); MWDERIVEDUNIT_1__nanomolarity_millisecond is "1/(nanomolarity*millisecond)";
  unit MWDERIVEDUNIT_1__nanomolarity___2_millisecond = metre^6 * 1e15 dimensionless / (mole^2 * second); MWDERIVEDUNIT_1__nanomolarity___2_millisecond is "1/(nanomolarity^2*millisecond)";
  unit MWBUILTINPREFIX_milli_MWBUILTINUNIT_second = 1e-3 second; MWBUILTINPREFIX_milli_MWBUILTINUNIT_second is "millisecond";
end
