// SBML level 2 version 4

model Nair_2016_optimized()

  // Compartments:
  compartment Spine = 1e-15 liter;

  // Species:
  species AC5 in Spine = 700;
  species AC5_ATP in Spine = 0;
  species AC5_Ca in Spine = 0;
  species AC5_Ca_ATP in Spine = 0;
  species AC5_Ca_GaolfGTP in Spine = 0;
  species AC5_Ca_GaolfGTP_ATP in Spine = 0;
  species AC5_GaolfGTP in Spine = 0;
  species AC5_GaolfGTP_ATP in Spine = 0;
  species $AMP in Spine = 0;
  species $ATP in Spine = 5000000;
  species B56PP2A in Spine = 2000;
  species B56PP2A_D32p75 in Spine = 0;
  species B56PP2A_pARPP21 in Spine = 0;
  species B56PP2Ap in Spine = 0;
  species B56PP2Ap_D32p75 in Spine = 0;
  species B56PP2Ap_pARPP21 in Spine = 0;
  species B72PP2A in Spine = 2000;
  species B72PP2A_D32p34 in Spine = 0;
  species B72PP2A_D32p75 in Spine = 0;
  species B72PP2A_pARPP21 in Spine = 0;
  species B72PP2A_Ca_D32p34 in Spine = 0;
  species B72PP2A_Ca_D32p75 in Spine = 0;
  species B72PP2A_Ca in Spine = 0;
  species B72PP2A_Ca_pARPP21 in Spine = 0;
  species $Ca in Spine = 60;
  species CaM in Spine = 9000;
  species CaM_Ca2 in Spine = 0;
  species CaM_Ca4 in Spine = 0;
  species CaM_Ca4_pARPP21 in Spine = 0;
  species CaMKII in Spine = 20000;
  species CaMKII_CaM_Ca4 in Spine = 0;
  species CaMKII_CaM in Spine = 0;
  species CaMKII_CaM_Ca2 in Spine = 0;
  species CaMKII_CaM_Ca2_psd in Spine = 0;
  species CaMKII_CaM_psd in Spine = 0;
  species CaMKII_CaM_Ca4_psd in Spine = 0;
  species CaMKII_psd in Spine = 0;
  species cAMP in Spine = 0;
  species Substrate in Spine = 3000;
  species CDK5 in Spine = 1800;
  species CDK5_D32 in Spine = 0;
  species D1R in Spine = 2000;
  species D1R_DA in Spine = 0;
  species D1R_Golf_DA in Spine = 0;
  species D1R_Golf in Spine = 0;
  species D32p34 in Spine = 0;
  species D32p75 in Spine = 0;
  species D32 in Spine = 50000;
  species $DA in Spine = 20;
  species GaolfGDP in Spine = 0;
  species GaolfGTP in Spine = 0;
  species Gbgolf in Spine = 0;
  species Golf in Spine = 2000;
  species pCaMKII in Spine = 0;
  species pCaMKII_CaM_Ca4 in Spine = 0;
  species pCaMKII_CaM in Spine = 0;
  species pCaMKII_CaM_Ca2 in Spine = 0;
  species pCaMKII_CaM_Ca2_psd in Spine = 0;
  species pCaMKII_CaM_psd in Spine = 0;
  species pCaMKII_CaM_Ca4_psd in Spine = 0;
  species pCaMKII_psd in Spine = 0;
  species pSubstrate in Spine = 0;
  species PDE4 in Spine = 2000;
  species PDE4_cAMP in Spine = 0;
  species PDE10r in Spine = 700;
  species PDE10r_cAMP in Spine = 0;
  species PDE10c in Spine = 0;
  species PDE10c_cAMP in Spine = 0;
  species PKA in Spine = 1200;
  species PKAc in Spine = 0;
  species PKAc_B56PP2A in Spine = 0;
  species PKAc_D32 in Spine = 0;
  species PKAc_ARPP21 in Spine = 0;
  species PKA_Ca2MP in Spine = 0;
  species PKA_Ca4MP in Spine = 0;
  species PKAc_D32p75 in Spine = 0;
  species PKAreg in Spine = 0;
  species PP1 in Spine = 3000;
  species PP1_pCaMKII_psd in Spine = 0;
  species PP1_pSubstrate in Spine = 0;
  species PP1_D32p34 in Spine = 0;
  species CaMKII_CaM_Ca4_psd_CaMKII_CaM_Ca4_psd in Spine = 0;
  species pCaMKII_CaM_Ca4_psd_CaMKII_CaM_Ca4_psd in Spine = 0;
  species CaMKII_CaM_Ca4_CaMKII_CaM_Ca4 in Spine = 0;
  species pCaMKII_CaM_Ca4_CaMKII_CaM_Ca4 in Spine = 0;
  species PP2B in Spine = 4000;
  species PP2Bc in Spine = 0;
  species PP2Bc_D32p34 in Spine = 0;
  species PP2B_CaM in Spine = 0;
  species PP2B_CaM_Ca2 in Spine = 0;
  species pARPP21 in Spine = 0;
  species ARPP21 in Spine = 20000;
  species pCaMKII_psd_Substrate in Spine = 0;
  species pCaMKII_CaM_psd_Substrate in Spine = 0;
  species pCaMKII_CaM_Ca2_psd_Substrate in Spine = 0;
  species pCaMKII_CaM_Ca4_psd_Substrate in Spine = 0;
  species CaMKII_CaM_psd_Substrate in Spine = 0;
  species CaMKII_CaM_Ca2_psd_Substrate in Spine = 0;
  species CaMKII_CaM_Ca4_psd_Substrate in Spine = 0;
  species $DA_expression in Spine;
  species $pSubstrate_out in Spine;
  species $PP1_out in Spine;
  species $CaM_out in Spine;
  species $D32_out in Spine;

  // Parameters:
  tau_DA1 = 34.979 millisecond;
  tau_DA2 = 420 millisecond;
  DA_basal = 20 nanomole_per_liter;
  Ca_basal = 60 nanomole_per_liter;
  kf_R0 = 0.02999853 one_over_millisecond;
  kf_R1 = 0.0150003 one_over_millisecond;
  kf_R2 = 5.000345e-5 liter_per_nanomole_millisecond;
  kr_R2 = 0.25 one_over_millisecond;
  kf_R3 = 5.000345e-5 liter_per_nanomole_millisecond;
  kr_R3 = 0.25 one_over_millisecond;
  kf_R4 = 0.01 liter_per_nanomole_millisecond;
  kr_R4 = 0.001 one_over_millisecond;
  kf_R5 = 6.000674e-6 liter_per_nanomole_millisecond;
  kr_R5 = 0.01999862 one_over_millisecond;
  kf_R6 = 0.0001 liter_per_nanomole_millisecond;
  kr_R6 = 2.999991 one_over_millisecond;
  kf_R7 = 0.0001 liter_per_nanomole_millisecond;
  kr_R7 = 2.999853e-6 one_over_millisecond;
  kf_R8 = 1e-5 liter_per_nanomole_millisecond;
  kr_R8 = 0.2 one_over_millisecond;
  kf_R9 = 0.01 one_over_millisecond;
  kf_R10 = 1e-6 liter_per_nanomole_millisecond;
  kr_R10 = 0.0002999853 one_over_millisecond;
  kf_R11 = 0.0001999862 one_over_millisecond;
  kf_R12 = 0.001 liter_per_nanomole_millisecond;
  kr_R12 = 0.00150003 one_over_millisecond;
  kf_R13 = 1e-6 liter_per_nanomole_millisecond;
  kr_R13 = 0.1 one_over_millisecond;
  kf_R14 = 0.01 one_over_millisecond;
  kf_R15 = 0.0001 liter_per_nanomole_millisecond;
  kr_R15 = 0.1 one_over_millisecond;
  kf_R16 = 1e-5 liter_per_nanomole_millisecond;
  kr_R16 = 0.01 one_over_millisecond;
  kf_R17 = 1.50003e-5 liter_per_nanomole_millisecond;
  kr_R17 = 0.1 one_over_millisecond;
  kf_R18 = 8.000184e-6 liter_per_nanomole_millisecond;
  kr_R18 = 0.1 one_over_millisecond;
  kf_R19 = 1.50003e-5 liter_per_nanomole_millisecond;
  kr_R19 = 0.1 one_over_millisecond;
  kf_R20 = 0.008000184 one_over_millisecond;
  kf_R21 = 0.00150003 one_over_millisecond;
  kf_R22 = 0.008000184 one_over_millisecond;
  kf_R23 = 0.00129987 liter_per_nanomole_millisecond;
  kr_R23 = 0.0001 one_over_millisecond;
  kf_R24 = 0.0001 liter_per_nanomole_millisecond;
  kr_R24 = 1 one_over_millisecond;
  kf_R25 = 6.000674e-6 liter_per_nanomole_millisecond;
  kr_R25 = 1.999862e-7 one_over_millisecond;
  kf_R26 = 0.0001 liter_per_nanomole_millisecond;
  kr_R26 = 0.1 one_over_millisecond;
  kf_R27 = 0.0001 liter_per_nanomole_millisecond;
  kr_R27 = 2.999853e-5 one_over_millisecond;
  kf_R28 = 1e-6 liter_per_nanomole_millisecond;
  kr_R28 = 0.01 one_over_millisecond;
  kf_R29 = 0.01 liter_per_nanomole_millisecond;
  kr_R29 = 0.001 one_over_millisecond;
  kf_R30 = 8.000184e-6 liter_per_nanomole_millisecond;
  kr_R30 = 0.1 one_over_millisecond;
  kf_R31 = 0.00150003 one_over_millisecond;
  kf_R32 = 0.002999853 one_over_millisecond;
  kf_R33 = 0.002999853 one_over_millisecond;
  kf_R34 = 5.000345e-7 liter_per_nanomole_millisecond;
  kr_R34 = 0.001 one_over_millisecond;
  kf_R35 = 5.000345e-7 liter_per_nanomole_millisecond;
  kr_R35 = 0.001 one_over_millisecond;
  kf_R36 = 0.001200052 one_over_millisecond;
  kf_R37 = 8.000184e-6 one_over_millisecond;
  kf_R38 = 2.60016e-5 liter_per_nanomole_millisecond;
  kr_R38 = 0.3500016 one_over_millisecond;
  kf_R39 = 3.46019e-5 liter_per_nanomole_millisecond;
  kr_R39 = 0.05000345 one_over_millisecond;
  kf_R40 = 0.05000345 one_over_millisecond;
  kr_R40 = 2.999853e-5 liter_per_nanomole_millisecond;
  kf_R41 = 2.999853e-5 liter_per_nanomole_millisecond;
  kr_R41 = 0.001 one_over_millisecond;
  kf_R42 = 0.00249977 one_over_millisecond;
  kf_R43 = 1e-9 liter_square_per_nanomole_square_millisecond;
  kr_R43 = 0.001 one_over_millisecond;
  kf_R44 = 0.002999853 one_over_millisecond;
  kf_R45 = 0.0001 liter_per_nanomole_millisecond;
  kr_R45 = 0.001999862 one_over_millisecond;
  kf_R46 = 0.01 one_over_millisecond;
  kf_R47 = 0.1 liter_per_nanomole_millisecond;
  kf_R48 = 2.549764e-6 liter_per_nanomole_millisecond;
  kr_R48 = 0.001 one_over_millisecond;
  kf_R49 = 1e-7 liter_per_nanomole_millisecond;
  kr_R49 = 0.001 one_over_millisecond;
  kf_R50 = 7.500669e-8 liter_per_nanomole_millisecond;
  kr_R50 = 0.001 one_over_millisecond;
  kf_R51 = 1.29987e-6 liter_per_nanomole_millisecond;
  kr_R51 = 0.001 one_over_millisecond;
  kf_R52 = 0.01 liter_per_nanomole_millisecond;
  kr_R52 = 0.001 one_over_millisecond;
  kf_R53 = 0.01 liter_per_nanomole_millisecond;
  kr_R53 = 0.001 one_over_millisecond;
  kf_R54 = 1e-6 liter_per_nanomole_millisecond;
  kr_R54 = 0.01 one_over_millisecond;
  kf_R55 = 0.05000345 one_over_millisecond;
  kf_R56 = 0.002549764 liter_per_nanomole_millisecond;
  kf_R57 = 0.001 one_over_millisecond;
  kf_R58 = 1.999862e-6 liter_per_nanomole_millisecond;
  kf_R59 = 0.0005000345 one_over_millisecond;
  kf_R60 = 7.500669e-7 liter_per_nanomole_millisecond;
  kf_R61 = 0.0249977 one_over_millisecond;
  kf_R62 = 0.00064998 liter_per_nanomole_millisecond;
  kf_R63 = 0.001 one_over_millisecond;
  kf_R64 = 0.001 one_over_millisecond;
  kf_R65 = 0.001 one_over_millisecond;
  kf_R66 = 0.001 one_over_millisecond;
  kf_R67 = 6.000674e-5 liter_per_nanomole_millisecond;
  kr_R67 = 0.25 one_over_millisecond;
  kf_R68 = 6.000674e-5 liter_per_nanomole_millisecond;
  kr_R68 = 0.25 one_over_millisecond;
  kf_R69 = 0.0001 liter_per_nanomole_millisecond;
  kr_R69 = 0.001999862 one_over_millisecond;
  kf_R70 = 0.0001 liter_per_nanomole_millisecond;
  kr_R70 = 0.04000369 one_over_millisecond;
  kf_R71 = 0.0001 liter_per_nanomole_millisecond;
  kr_R71 = 0.4 one_over_millisecond;
  kf_R72 = 0.0001 liter_per_nanomole_millisecond;
  kr_R72 = 4 one_over_millisecond;
  kf_R73 = 0.0001 liter_per_nanomole_millisecond;
  kr_R73 = 0.1 one_over_millisecond;
  kf_R74 = 6.000674e-6 liter_per_nanomole_millisecond;
  kr_R74 = 0.001999862 one_over_millisecond;
  kf_R75 = 0.0001 liter_per_nanomole_millisecond;
  kr_R75 = 0.01 one_over_millisecond;
  kf_R76 = 6.000674e-6 liter_per_nanomole_millisecond;
  kr_R76 = 0.001999862 one_over_millisecond;
  kf_R77 = 0.0001 liter_per_nanomole_millisecond;
  kr_R77 = 0.0004000369 one_over_millisecond;
  kf_R78 = 0.0001 liter_per_nanomole_millisecond;
  kr_R78 = 0.04000369 one_over_millisecond;
  kf_R79 = 0.0001 liter_per_nanomole_millisecond;
  kr_R79 = 0.4 one_over_millisecond;
  kf_R80 = 4.49987e-5 liter_per_nanomole_millisecond;
  kr_R80 = 0.2 one_over_millisecond;
  kf_R81 = 0.01 one_over_millisecond;
  kf_R82 = 0.0005000345 liter_per_nanomole_millisecond;
  kr_R82 = 0.01 one_over_millisecond;
  kf_R83 = 0.01 one_over_millisecond;
  kf_R84 = 7.000032e-6 liter_per_nanomole_millisecond;
  kr_R84 = 0.1 one_over_millisecond;
  kf_R85 = 0.001 one_over_millisecond;
  kf_R86 = 4.000369e-6 liter_per_nanomole_millisecond;
  kr_R86 = 0.1 one_over_millisecond;
  kf_R87 = 0.01 one_over_millisecond;
  kf_R88 = 7.000032e-6 liter_per_nanomole_millisecond;
  kr_R88 = 0.1 one_over_millisecond;
  kf_R89 = 0.001 one_over_millisecond;
  kf_R90 = 4.000369e-6 liter_per_nanomole_millisecond;
  kr_R90 = 0.1 one_over_millisecond;
  kf_R91 = 5.000345e-7 liter_per_nanomole_millisecond;
  kr_R91 = 0.001 one_over_millisecond;
  kf_R92 = 0.01 one_over_millisecond;
  kf_R93 = 5.000345e-7 liter_per_nanomole_millisecond;
  kr_R93 = 0.01 one_over_millisecond;
  kf_R94 = 0.01 one_over_millisecond;
  kf_R95 = 0.0001 one_over_millisecond;
  kf_R96 = 5.000345e-7 liter_per_nanomole_millisecond;
  kr_R96 = 0.01 one_over_millisecond;
  kf_R97 = 0.01 one_over_millisecond;
  kf_R98 = 5.000345e-7 liter_per_nanomole_millisecond;
  kr_R98 = 0.01 one_over_millisecond;
  kf_R99 = 0.01 one_over_millisecond;
  kf_R100 = 5.000345e-7 liter_per_nanomole_millisecond;
  kr_R100 = 0.01 one_over_millisecond;
  kf_R101 = 0.01 one_over_millisecond;
  kf_R102 = 5.000345e-7 liter_per_nanomole_millisecond;
  kr_R102 = 0.01 one_over_millisecond;
  kf_R103 = 0.01 one_over_millisecond;
  kf_R104 = 5.000345e-7 liter_per_nanomole_millisecond;
  kr_R104 = 0.01 one_over_millisecond;
  kf_R105 = 0.01 one_over_millisecond;
  kf_R106 = 5.000345e-7 liter_per_nanomole_millisecond;
  kr_R106 = 0.01 one_over_millisecond;
  kf_R107 = 0.01 one_over_millisecond;
  kf_R108 = 0.0005000345 one_over_millisecond;
  kr_R108 = 1e-6 one_over_millisecond;
  kf_R109 = 0.0005000345 one_over_millisecond;
  kr_R109 = 1e-6 one_over_millisecond;
  kf_R110 = 0.0005000345 one_over_millisecond;
  kr_R110 = 1e-6 one_over_millisecond;
  kf_R111 = 0.0005000345 one_over_millisecond;
  kr_R111 = 1e-6 one_over_millisecond;
  kf_R112 = 0.0001 liter_per_nanomole_millisecond;
  kr_R112 = 0.0004000369 one_over_millisecond;
  kf_R113 = 0.0001 liter_per_nanomole_millisecond;
  kr_R113 = 0.04000369 one_over_millisecond;
  kf_R114 = 0.0001 liter_per_nanomole_millisecond;
  kr_R114 = 0.4 one_over_millisecond;
  kf_R115 = 6.000674e-6 liter_per_nanomole_millisecond;
  kr_R115 = 0.001999862 one_over_millisecond;
  kf_R116 = 0.0001 liter_per_nanomole_millisecond;
  kr_R116 = 0.01 one_over_millisecond;
  kf_R117 = 8.000184e-7 liter_per_nanomole_millisecond;
  kr_R117 = 0.001 one_over_millisecond;
  kf_R118 = 0.001 one_over_millisecond;
  kf_R119 = 0.0005000345 one_over_millisecond;
  kf_R120 = 0.0001 liter_per_nanomole_millisecond;
  kr_R120 = 0.04000369 one_over_millisecond;
  kf_R121 = 0.0001 liter_per_nanomole_millisecond;
  kr_R121 = 0.4 one_over_millisecond;
  kf_R122 = 0.0001 liter_per_nanomole_millisecond;
  kr_R122 = 4 one_over_millisecond;
  kf_R123 = 0.0001 liter_per_nanomole_millisecond;
  kr_R123 = 0.1 one_over_millisecond;
  kf_R124 = 6.000674e-6 liter_per_nanomole_millisecond;
  kr_R124 = 0.001999862 one_over_millisecond;
  kf_R125 = 0.0005000345 one_over_millisecond;
  kr_R125 = 0.0005000345 one_over_millisecond;
  kf_R126 = 0.0005000345 one_over_millisecond;
  kr_R126 = 0.0005000345 one_over_millisecond;
  kf_R127 = 0.0005000345 one_over_millisecond;
  kr_R127 = 0.0005000345 one_over_millisecond;
  kf_R128 = 0.0005000345 one_over_millisecond;
  kr_R128 = 0.0005000345 one_over_millisecond;
  kf_R129 = 1e-6 one_over_millisecond;
  kr_R129 = 0.0005000345 one_over_millisecond;
  kf_R130 = 3.599979e-7 liter_per_nanomole_millisecond;
  kr_R130 = 0.02299853 one_over_millisecond;
  kf_R131 = 0.003900318 one_over_millisecond;
  kf_R132 = 1.100019e-6 liter_per_nanomole_millisecond;
  kr_R132 = 0.005400078 one_over_millisecond;
  kf_R133 = 10 one_over_millisecond;
  kf_R134 = 3.599979e-7 liter_per_nanomole_millisecond;
  kr_R134 = 0.02299853 one_over_millisecond;
  kf_R135 = 0.003900318 one_over_millisecond;
  kf_R136 = 1.100019e-6 liter_per_nanomole_millisecond;
  kr_R136 = 0.005400078 one_over_millisecond;
  kf_R137 = 10 one_over_millisecond;
  DA_start = 100 millisecond;
  DA_max = 1480 nanomole_per_liter;
  ATP_expression = 5000000 nanomole_per_liter;
  Ca_expression = 1 nanomole_per_liter;

  // Assignment rules:
  DA_expression := DA_basal + 1/(1 + exp(-10e10*(time - DA_start)))*(DA_max/(exp(-tau_DA1*tau_DA2/(tau_DA2 - tau_DA1)*log10(tau_DA2/tau_DA1)/tau_DA1) - exp(-tau_DA1*tau_DA2/(tau_DA2 - tau_DA1)*log10(tau_DA2/tau_DA1)/tau_DA2)))*(exp(-(time - DA_start)/tau_DA1) - exp(-(time - DA_start)/tau_DA2));
  pSubstrate_out := pSubstrate;
  PP1_out := PP1;
  CaM_out := CaM;
  D32_out := D32;

  // Reactions:
  ReactionFlux0: GaolfGTP => GaolfGDP; kf_R0*GaolfGTP*Spine;
  ReactionFlux1: D1R_Golf_DA => Gbgolf + D1R_DA + GaolfGTP; kf_R1*D1R_Golf_DA*Spine;
  ReactionFlux2: D1R_Golf + $DA -> D1R_Golf_DA; (kf_R2*D1R_Golf*DA - kr_R2*D1R_Golf_DA)*Spine;
  ReactionFlux3: D1R + $DA -> D1R_DA; (kf_R3*D1R*DA - kr_R3*D1R_DA)*Spine;
  ReactionFlux4: AC5 + GaolfGTP -> AC5_GaolfGTP; (kf_R4*AC5*GaolfGTP - kr_R4*AC5_GaolfGTP)*Spine;
  ReactionFlux5: CaM + $Ca -> CaM_Ca2; (kf_R5*CaM*Ca - kr_R5*CaM_Ca2)*Spine;
  ReactionFlux6: PP2B + CaM -> PP2B_CaM; (kf_R6*PP2B*CaM - kr_R6*PP2B_CaM)*Spine;
  ReactionFlux7: CaM_Ca4 + PP2B -> PP2Bc; (kf_R7*CaM_Ca4*PP2B - kr_R7*PP2Bc)*Spine;
  ReactionFlux8: PKAc + D32 -> PKAc_D32; (kf_R8*PKAc*D32 - kr_R8*PKAc_D32)*Spine;
  ReactionFlux9: PKAc_D32 => D32p34 + PKAc; kf_R9*PKAc_D32*Spine;
  ReactionFlux10: PKAc + B56PP2A -> PKAc_B56PP2A; (kf_R10*PKAc*B56PP2A - kr_R10*PKAc_B56PP2A)*Spine;
  ReactionFlux11: PKAc_B56PP2A => B56PP2Ap + PKAc; kf_R11*PKAc_B56PP2A*Spine;
  ReactionFlux12: D32p34 + PP1 -> PP1_D32p34; (kf_R12*D32p34*PP1 - kr_R12*PP1_D32p34)*Spine;
  ReactionFlux13: CDK5 + D32 -> CDK5_D32; (kf_R13*CDK5*D32 - kr_R13*CDK5_D32)*Spine;
  ReactionFlux14: CDK5_D32 => CDK5 + D32p75; kf_R14*CDK5_D32*Spine;
  ReactionFlux15: D32p75 + PKAc -> PKAc_D32p75; (kf_R15*D32p75*PKAc - kr_R15*PKAc_D32p75)*Spine;
  ReactionFlux16: B72PP2A + $Ca -> B72PP2A_Ca; (kf_R16*B72PP2A*Ca - kr_R16*B72PP2A_Ca)*Spine;
  ReactionFlux17: B56PP2Ap + D32p75 -> B56PP2Ap_D32p75; (kf_R17*B56PP2Ap*D32p75 - kr_R17*B56PP2Ap_D32p75)*Spine;
  ReactionFlux18: B72PP2A + D32p75 -> B72PP2A_D32p75; (kf_R18*B72PP2A*D32p75 - kr_R18*B72PP2A_D32p75)*Spine;
  ReactionFlux19: D32p75 + B72PP2A_Ca -> B72PP2A_Ca_D32p75; (kf_R19*D32p75*B72PP2A_Ca - kr_R19*B72PP2A_Ca_D32p75)*Spine;
  ReactionFlux20: B56PP2Ap_D32p75 => B56PP2Ap + D32; kf_R20*B56PP2Ap_D32p75*Spine;
  ReactionFlux21: B72PP2A_D32p75 => B72PP2A + D32; kf_R21*B72PP2A_D32p75*Spine;
  ReactionFlux22: B72PP2A_Ca_D32p75 => B72PP2A_Ca + D32; kf_R22*B72PP2A_Ca_D32p75*Spine;
  ReactionFlux23: D32p34 + PP2Bc -> PP2Bc_D32p34; (kf_R23*D32p34*PP2Bc - kr_R23*PP2Bc_D32p34)*Spine;
  ReactionFlux24: CaM_Ca2 + $Ca -> CaM_Ca4; (kf_R24*CaM_Ca2*Ca - kr_R24*CaM_Ca4)*Spine;
  ReactionFlux25: $Ca + PP2B_CaM -> PP2B_CaM_Ca2; (kf_R25*Ca*PP2B_CaM - kr_R25*PP2B_CaM_Ca2)*Spine;
  ReactionFlux26: $Ca + PP2B_CaM_Ca2 -> PP2Bc; (kf_R26*Ca*PP2B_CaM_Ca2 - kr_R26*PP2Bc)*Spine;
  ReactionFlux27: CaM_Ca2 + PP2B -> PP2B_CaM_Ca2; (kf_R27*CaM_Ca2*PP2B - kr_R27*PP2B_CaM_Ca2)*Spine;
  ReactionFlux28: AC5 + $Ca -> AC5_Ca; (kf_R28*AC5*Ca - kr_R28*AC5_Ca)*Spine;
  ReactionFlux29: AC5_Ca + GaolfGTP -> AC5_Ca_GaolfGTP; (kf_R29*AC5_Ca*GaolfGTP - kr_R29*AC5_Ca_GaolfGTP)*Spine;
  ReactionFlux30: D32p75 + B56PP2A -> B56PP2A_D32p75; (kf_R30*D32p75*B56PP2A - kr_R30*B56PP2A_D32p75)*Spine;
  ReactionFlux31: B56PP2A_D32p75 => B56PP2A + D32; kf_R31*B56PP2A_D32p75*Spine;
  ReactionFlux32: B72PP2A_Ca_D32p34 => B72PP2A_Ca + D32; kf_R32*B72PP2A_Ca_D32p34*Spine;
  ReactionFlux33: B72PP2A_D32p34 => D32 + B72PP2A; kf_R33*B72PP2A_D32p34*Spine;
  ReactionFlux34: D32p34 + B72PP2A_Ca -> B72PP2A_Ca_D32p34; (kf_R34*D32p34*B72PP2A_Ca - kr_R34*B72PP2A_Ca_D32p34)*Spine;
  ReactionFlux35: D32p34 + B72PP2A -> B72PP2A_D32p34; (kf_R35*D32p34*B72PP2A - kr_R35*B72PP2A_D32p34)*Spine;
  ReactionFlux36: PP2Bc_D32p34 => D32 + PP2Bc; kf_R36*PP2Bc_D32p34*Spine;
  ReactionFlux37: B56PP2Ap => B56PP2A; kf_R37*B56PP2Ap*Spine;
  ReactionFlux38: cAMP + PKA -> PKA_Ca2MP; (kf_R38*cAMP*PKA - kr_R38*PKA_Ca2MP)*Spine;
  ReactionFlux39: cAMP + PKA_Ca2MP -> PKA_Ca4MP; (kf_R39*cAMP*PKA_Ca2MP - kr_R39*PKA_Ca4MP)*Spine;
  ReactionFlux40: PKA_Ca4MP -> PKAc + PKAreg; (kf_R40*PKA_Ca4MP - kr_R40*PKAc*PKAreg)*Spine;
  ReactionFlux41: cAMP + PDE4 -> PDE4_cAMP; (kf_R41*cAMP*PDE4 - kr_R41*PDE4_cAMP)*Spine;
  ReactionFlux42: PDE4_cAMP => PDE4 + $AMP; kf_R42*PDE4_cAMP*Spine;
  ReactionFlux43: PDE10r + 2 cAMP -> PDE10c; (kf_R43*PDE10r*cAMP^2 - kr_R43*PDE10c)*Spine;
  ReactionFlux44: PDE10r_cAMP => PDE10r + $AMP; kf_R44*PDE10r_cAMP*Spine;
  ReactionFlux45: cAMP + PDE10r -> PDE10r_cAMP; (kf_R45*cAMP*PDE10r - kr_R45*PDE10r_cAMP)*Spine;
  ReactionFlux46: PDE10c_cAMP => PDE10c + $AMP; kf_R46*PDE10c_cAMP*Spine;
  ReactionFlux47: GaolfGDP + Gbgolf => Golf; kf_R47*GaolfGDP*Gbgolf*Spine;
  ReactionFlux48: AC5_GaolfGTP + $ATP -> AC5_GaolfGTP_ATP; (kf_R48*AC5_GaolfGTP*ATP - kr_R48*AC5_GaolfGTP_ATP)*Spine;
  ReactionFlux49: AC5 + $ATP -> AC5_ATP; (kf_R49*AC5*ATP - kr_R49*AC5_ATP)*Spine;
  ReactionFlux50: AC5_Ca + $ATP -> AC5_Ca_ATP; (kf_R50*AC5_Ca*ATP - kr_R50*AC5_Ca_ATP)*Spine;
  ReactionFlux51: AC5_Ca_GaolfGTP + $ATP -> AC5_Ca_GaolfGTP_ATP; (kf_R51*AC5_Ca_GaolfGTP*ATP - kr_R51*AC5_Ca_GaolfGTP_ATP)*Spine;
  ReactionFlux52: GaolfGTP + AC5_ATP -> AC5_GaolfGTP_ATP; (kf_R52*GaolfGTP*AC5_ATP - kr_R52*AC5_GaolfGTP_ATP)*Spine;
  ReactionFlux53: GaolfGTP + AC5_Ca_ATP -> AC5_Ca_GaolfGTP_ATP; (kf_R53*GaolfGTP*AC5_Ca_ATP - kr_R53*AC5_Ca_GaolfGTP_ATP)*Spine;
  ReactionFlux54: $Ca + AC5_ATP -> AC5_Ca_ATP; (kf_R54*Ca*AC5_ATP - kr_R54*AC5_Ca_ATP)*Spine;
  ReactionFlux55: AC5_GaolfGTP_ATP => cAMP + AC5_GaolfGTP; kf_R55*AC5_GaolfGTP_ATP*Spine;
  ReactionFlux56: cAMP + AC5_GaolfGTP => AC5_GaolfGTP_ATP; kf_R56*cAMP*AC5_GaolfGTP*Spine;
  ReactionFlux57: AC5_ATP => cAMP + AC5; kf_R57*AC5_ATP*Spine;
  ReactionFlux58: cAMP + AC5 => AC5_ATP; kf_R58*cAMP*AC5*Spine;
  ReactionFlux59: AC5_Ca_ATP => cAMP + AC5_Ca; kf_R59*AC5_Ca_ATP*Spine;
  ReactionFlux60: cAMP + AC5_Ca => AC5_Ca_ATP; kf_R60*cAMP*AC5_Ca*Spine;
  ReactionFlux61: AC5_Ca_GaolfGTP_ATP => cAMP + AC5_Ca_GaolfGTP; kf_R61*AC5_Ca_GaolfGTP_ATP*Spine;
  ReactionFlux62: cAMP + AC5_Ca_GaolfGTP => AC5_Ca_GaolfGTP_ATP; kf_R62*cAMP*AC5_Ca_GaolfGTP*Spine;
  ReactionFlux63: AC5_GaolfGTP => AC5 + GaolfGDP; kf_R63*AC5_GaolfGTP*Spine;
  ReactionFlux64: AC5_Ca_GaolfGTP => AC5_Ca + GaolfGDP; kf_R64*AC5_Ca_GaolfGTP*Spine;
  ReactionFlux65: AC5_GaolfGTP_ATP => AC5_ATP + GaolfGDP; kf_R65*AC5_GaolfGTP_ATP*Spine;
  ReactionFlux66: AC5_Ca_GaolfGTP_ATP => AC5_Ca_ATP + GaolfGDP; kf_R66*AC5_Ca_GaolfGTP_ATP*Spine;
  ReactionFlux67: D1R + Golf -> D1R_Golf; (kf_R67*D1R*Golf - kr_R67*D1R_Golf)*Spine;
  ReactionFlux68: Golf + D1R_DA -> D1R_Golf_DA; (kf_R68*Golf*D1R_DA - kr_R68*D1R_Golf_DA)*Spine;
  ReactionFlux69: cAMP + PDE10c -> PDE10c_cAMP; (kf_R69*cAMP*PDE10c - kr_R69*PDE10c_cAMP)*Spine;
  ReactionFlux70: CaMKII + CaM_Ca4 -> CaMKII_CaM_Ca4; (kf_R70*CaMKII*CaM_Ca4 - kr_R70*CaMKII_CaM_Ca4)*Spine;
  ReactionFlux71: CaM_Ca2 + CaMKII -> CaMKII_CaM_Ca2; (kf_R71*CaM_Ca2*CaMKII - kr_R71*CaMKII_CaM_Ca2)*Spine;
  ReactionFlux72: CaM + CaMKII -> CaMKII_CaM; (kf_R72*CaM*CaMKII - kr_R72*CaMKII_CaM)*Spine;
  ReactionFlux73: CaMKII_CaM_Ca2 + $Ca -> CaMKII_CaM_Ca4; (kf_R73*CaMKII_CaM_Ca2*Ca - kr_R73*CaMKII_CaM_Ca4)*Spine;
  ReactionFlux74: CaMKII_CaM + $Ca -> CaMKII_CaM_Ca2; (kf_R74*CaMKII_CaM*Ca - kr_R74*CaMKII_CaM_Ca2)*Spine;
  ReactionFlux75: pCaMKII_CaM_Ca2 + $Ca -> pCaMKII_CaM_Ca4; (kf_R75*pCaMKII_CaM_Ca2*Ca - kr_R75*pCaMKII_CaM_Ca4)*Spine;
  ReactionFlux76: pCaMKII_CaM + $Ca -> pCaMKII_CaM_Ca2; (kf_R76*pCaMKII_CaM*Ca - kr_R76*pCaMKII_CaM_Ca2)*Spine;
  ReactionFlux77: pCaMKII + CaM_Ca4 -> pCaMKII_CaM_Ca4; (kf_R77*pCaMKII*CaM_Ca4 - kr_R77*pCaMKII_CaM_Ca4)*Spine;
  ReactionFlux78: pCaMKII + CaM_Ca2 -> pCaMKII_CaM_Ca2; (kf_R78*pCaMKII*CaM_Ca2 - kr_R78*pCaMKII_CaM_Ca2)*Spine;
  ReactionFlux79: pCaMKII + CaM -> pCaMKII_CaM; (kf_R79*pCaMKII*CaM - kr_R79*pCaMKII_CaM)*Spine;
  ReactionFlux80: ARPP21 + PKAc -> PKAc_ARPP21; (kf_R80*ARPP21*PKAc - kr_R80*PKAc_ARPP21)*Spine;
  ReactionFlux81: PKAc_ARPP21 => PKAc + pARPP21; kf_R81*PKAc_ARPP21*Spine;
  ReactionFlux82: pARPP21 + CaM_Ca4 -> CaM_Ca4_pARPP21; (kf_R82*pARPP21*CaM_Ca4 - kr_R82*CaM_Ca4_pARPP21)*Spine;
  ReactionFlux83: B72PP2A_Ca_pARPP21 => ARPP21 + B72PP2A_Ca; kf_R83*B72PP2A_Ca_pARPP21*Spine;
  ReactionFlux84: pARPP21 + B72PP2A_Ca -> B72PP2A_Ca_pARPP21; (kf_R84*pARPP21*B72PP2A_Ca - kr_R84*B72PP2A_Ca_pARPP21)*Spine;
  ReactionFlux85: B72PP2A_pARPP21 => ARPP21 + B72PP2A; kf_R85*B72PP2A_pARPP21*Spine;
  ReactionFlux86: pARPP21 + B72PP2A -> B72PP2A_pARPP21; (kf_R86*pARPP21*B72PP2A - kr_R86*B72PP2A_pARPP21)*Spine;
  ReactionFlux87: B56PP2Ap_pARPP21 => ARPP21 + B56PP2Ap; kf_R87*B56PP2Ap_pARPP21*Spine;
  ReactionFlux88: pARPP21 + B56PP2Ap -> B56PP2Ap_pARPP21; (kf_R88*pARPP21*B56PP2Ap - kr_R88*B56PP2Ap_pARPP21)*Spine;
  ReactionFlux89: B56PP2A_pARPP21 => ARPP21 + B56PP2A; kf_R89*B56PP2A_pARPP21*Spine;
  ReactionFlux90: pARPP21 + B56PP2A -> B56PP2A_pARPP21; (kf_R90*pARPP21*B56PP2A - kr_R90*B56PP2A_pARPP21)*Spine;
  ReactionFlux91: pSubstrate + PP1 -> PP1_pSubstrate; (kf_R91*pSubstrate*PP1 - kr_R91*PP1_pSubstrate)*Spine;
  ReactionFlux92: PP1_pSubstrate => PP1 + Substrate; kf_R92*PP1_pSubstrate*Spine;
  ReactionFlux93: Substrate + pCaMKII_psd -> pCaMKII_psd_Substrate; (kf_R93*Substrate*pCaMKII_psd - kr_R93*pCaMKII_psd_Substrate)*Spine;
  ReactionFlux94: pCaMKII_psd_Substrate => pCaMKII_psd + pSubstrate; kf_R94*pCaMKII_psd_Substrate*Spine;
  ReactionFlux95: pCaMKII => CaMKII; kf_R95*pCaMKII*Spine;
  ReactionFlux96: Substrate + pCaMKII_CaM_psd -> pCaMKII_CaM_psd_Substrate; (kf_R96*Substrate*pCaMKII_CaM_psd - kr_R96*pCaMKII_CaM_psd_Substrate)*Spine;
  ReactionFlux97: pCaMKII_CaM_psd_Substrate => pCaMKII_CaM_psd + pSubstrate; kf_R97*pCaMKII_CaM_psd_Substrate*Spine;
  ReactionFlux98: Substrate + pCaMKII_CaM_Ca2_psd -> pCaMKII_CaM_Ca2_psd_Substrate; (kf_R98*Substrate*pCaMKII_CaM_Ca2_psd - kr_R98*pCaMKII_CaM_Ca2_psd_Substrate)*Spine;
  ReactionFlux99: pCaMKII_CaM_Ca2_psd_Substrate => pCaMKII_CaM_Ca2_psd + pSubstrate; kf_R99*pCaMKII_CaM_Ca2_psd_Substrate*Spine;
  ReactionFlux100: Substrate + pCaMKII_CaM_Ca4_psd -> pCaMKII_CaM_Ca4_psd_Substrate; (kf_R100*Substrate*pCaMKII_CaM_Ca4_psd - kr_R100*pCaMKII_CaM_Ca4_psd_Substrate)*Spine;
  ReactionFlux101: pCaMKII_CaM_Ca4_psd_Substrate => pCaMKII_CaM_Ca4_psd + pSubstrate; kf_R101*pCaMKII_CaM_Ca4_psd_Substrate*Spine;
  ReactionFlux102: Substrate + CaMKII_CaM_psd -> CaMKII_CaM_psd_Substrate; (kf_R102*Substrate*CaMKII_CaM_psd - kr_R102*CaMKII_CaM_psd_Substrate)*Spine;
  ReactionFlux103: CaMKII_CaM_psd_Substrate => CaMKII_CaM_psd + pSubstrate; kf_R103*CaMKII_CaM_psd_Substrate*Spine;
  ReactionFlux104: Substrate + CaMKII_CaM_Ca2_psd -> CaMKII_CaM_Ca2_psd_Substrate; (kf_R104*Substrate*CaMKII_CaM_Ca2_psd - kr_R104*CaMKII_CaM_Ca2_psd_Substrate)*Spine;
  ReactionFlux105: CaMKII_CaM_Ca2_psd_Substrate => CaMKII_CaM_Ca2_psd + pSubstrate; kf_R105*CaMKII_CaM_Ca2_psd_Substrate*Spine;
  ReactionFlux106: Substrate + CaMKII_CaM_Ca4_psd -> CaMKII_CaM_Ca4_psd_Substrate; (kf_R106*Substrate*CaMKII_CaM_Ca4_psd - kr_R106*CaMKII_CaM_Ca4_psd_Substrate)*Spine;
  ReactionFlux107: CaMKII_CaM_Ca4_psd_Substrate => CaMKII_CaM_Ca4_psd + pSubstrate; kf_R107*CaMKII_CaM_Ca4_psd_Substrate*Spine;
  ReactionFlux108: pCaMKII_CaM_Ca4 -> pCaMKII_CaM_Ca4_psd; (kf_R108*pCaMKII_CaM_Ca4 - kr_R108*pCaMKII_CaM_Ca4_psd)*Spine;
  ReactionFlux109: pCaMKII_CaM_Ca2 -> pCaMKII_CaM_Ca2_psd; (kf_R109*pCaMKII_CaM_Ca2 - kr_R109*pCaMKII_CaM_Ca2_psd)*Spine;
  ReactionFlux110: pCaMKII_CaM -> pCaMKII_CaM_psd; (kf_R110*pCaMKII_CaM - kr_R110*pCaMKII_CaM_psd)*Spine;
  ReactionFlux111: pCaMKII -> pCaMKII_psd; (kf_R111*pCaMKII - kr_R111*pCaMKII_psd)*Spine;
  ReactionFlux112: CaM_Ca4 + pCaMKII_psd -> pCaMKII_CaM_Ca4_psd; (kf_R112*CaM_Ca4*pCaMKII_psd - kr_R112*pCaMKII_CaM_Ca4_psd)*Spine;
  ReactionFlux113: pCaMKII_psd + CaM_Ca2 -> pCaMKII_CaM_Ca2_psd; (kf_R113*pCaMKII_psd*CaM_Ca2 - kr_R113*pCaMKII_CaM_Ca2_psd)*Spine;
  ReactionFlux114: CaM + pCaMKII_psd -> pCaMKII_CaM_psd; (kf_R114*CaM*pCaMKII_psd - kr_R114*pCaMKII_CaM_psd)*Spine;
  ReactionFlux115: pCaMKII_CaM_psd + $Ca -> pCaMKII_CaM_Ca2_psd; (kf_R115*pCaMKII_CaM_psd*Ca - kr_R115*pCaMKII_CaM_Ca2_psd)*Spine;
  ReactionFlux116: pCaMKII_CaM_Ca2_psd + $Ca -> pCaMKII_CaM_Ca4_psd; (kf_R116*pCaMKII_CaM_Ca2_psd*Ca - kr_R116*pCaMKII_CaM_Ca4_psd)*Spine;
  ReactionFlux117: pCaMKII_psd + PP1 -> PP1_pCaMKII_psd; (kf_R117*pCaMKII_psd*PP1 - kr_R117*PP1_pCaMKII_psd)*Spine;
  ReactionFlux118: PP1_pCaMKII_psd => PP1 + CaMKII_psd; kf_R118*PP1_pCaMKII_psd*Spine;
  ReactionFlux119: CaMKII_psd => CaMKII; kf_R119*CaMKII_psd*Spine;
  ReactionFlux120: CaM_Ca4 + CaMKII_psd -> CaMKII_CaM_Ca4_psd; (kf_R120*CaM_Ca4*CaMKII_psd - kr_R120*CaMKII_CaM_Ca4_psd)*Spine;
  ReactionFlux121: CaM_Ca2 + CaMKII_psd -> CaMKII_CaM_Ca2_psd; (kf_R121*CaM_Ca2*CaMKII_psd - kr_R121*CaMKII_CaM_Ca2_psd)*Spine;
  ReactionFlux122: CaM + CaMKII_psd -> CaMKII_CaM_psd; (kf_R122*CaM*CaMKII_psd - kr_R122*CaMKII_CaM_psd)*Spine;
  ReactionFlux123: CaMKII_CaM_Ca2_psd + $Ca -> CaMKII_CaM_Ca4_psd; (kf_R123*CaMKII_CaM_Ca2_psd*Ca - kr_R123*CaMKII_CaM_Ca4_psd)*Spine;
  ReactionFlux124: CaMKII_CaM_psd + $Ca -> CaMKII_CaM_Ca2_psd; (kf_R124*CaMKII_CaM_psd*Ca - kr_R124*CaMKII_CaM_Ca2_psd)*Spine;
  ReactionFlux125: CaMKII_CaM -> CaMKII_CaM_psd; (kf_R125*CaMKII_CaM - kr_R125*CaMKII_CaM_psd)*Spine;
  ReactionFlux126: CaMKII_CaM_Ca2 -> CaMKII_CaM_Ca2_psd; (kf_R126*CaMKII_CaM_Ca2 - kr_R126*CaMKII_CaM_Ca2_psd)*Spine;
  ReactionFlux127: CaMKII_CaM_Ca4 -> CaMKII_CaM_Ca4_psd; (kf_R127*CaMKII_CaM_Ca4 - kr_R127*CaMKII_CaM_Ca4_psd)*Spine;
  ReactionFlux128: CaMKII_CaM_Ca4_psd_CaMKII_CaM_Ca4_psd -> CaMKII_CaM_Ca4_CaMKII_CaM_Ca4; (kf_R128*CaMKII_CaM_Ca4_psd_CaMKII_CaM_Ca4_psd - kr_R128*CaMKII_CaM_Ca4_CaMKII_CaM_Ca4)*Spine;
  ReactionFlux129: pCaMKII_CaM_Ca4_psd_CaMKII_CaM_Ca4_psd -> pCaMKII_CaM_Ca4_CaMKII_CaM_Ca4; (kf_R129*pCaMKII_CaM_Ca4_psd_CaMKII_CaM_Ca4_psd - kr_R129*pCaMKII_CaM_Ca4_CaMKII_CaM_Ca4)*Spine;
  ReactionFlux130: CaMKII_CaM_Ca4 + CaMKII_CaM_Ca4 -> CaMKII_CaM_Ca4_CaMKII_CaM_Ca4; (kf_R130*CaMKII_CaM_Ca4*CaMKII_CaM_Ca4 - kr_R130*CaMKII_CaM_Ca4_CaMKII_CaM_Ca4)*Spine;
  ReactionFlux131: CaMKII_CaM_Ca4_CaMKII_CaM_Ca4 => pCaMKII_CaM_Ca4 + CaMKII_CaM_Ca4; kf_R131*CaMKII_CaM_Ca4_CaMKII_CaM_Ca4*Spine;
  ReactionFlux132: pCaMKII_CaM_Ca4 + CaMKII_CaM_Ca4 -> pCaMKII_CaM_Ca4_CaMKII_CaM_Ca4; (kf_R132*pCaMKII_CaM_Ca4*CaMKII_CaM_Ca4 - kr_R132*pCaMKII_CaM_Ca4_CaMKII_CaM_Ca4)*Spine;
  ReactionFlux133: pCaMKII_CaM_Ca4_CaMKII_CaM_Ca4 => pCaMKII_CaM_Ca4 + pCaMKII_CaM_Ca4; kf_R133*pCaMKII_CaM_Ca4_CaMKII_CaM_Ca4*Spine;
  ReactionFlux134: CaMKII_CaM_Ca4_psd + CaMKII_CaM_Ca4_psd -> CaMKII_CaM_Ca4_psd_CaMKII_CaM_Ca4_psd; (kf_R134*CaMKII_CaM_Ca4_psd*CaMKII_CaM_Ca4_psd - kr_R134*CaMKII_CaM_Ca4_psd_CaMKII_CaM_Ca4_psd)*Spine;
  ReactionFlux135: CaMKII_CaM_Ca4_psd_CaMKII_CaM_Ca4_psd => pCaMKII_CaM_Ca4_psd + CaMKII_CaM_Ca4_psd; kf_R135*CaMKII_CaM_Ca4_psd_CaMKII_CaM_Ca4_psd*Spine;
  ReactionFlux136: pCaMKII_CaM_Ca4_psd + CaMKII_CaM_Ca4_psd -> pCaMKII_CaM_Ca4_psd_CaMKII_CaM_Ca4_psd; (kf_R136*pCaMKII_CaM_Ca4_psd*CaMKII_CaM_Ca4_psd - kr_R136*pCaMKII_CaM_Ca4_psd_CaMKII_CaM_Ca4_psd)*Spine;
  ReactionFlux137: pCaMKII_CaM_Ca4_psd_CaMKII_CaM_Ca4_psd => pCaMKII_CaM_Ca4_psd + pCaMKII_CaM_Ca4_psd; kf_R137*pCaMKII_CaM_Ca4_psd_CaMKII_CaM_Ca4_psd*Spine;

  // Unit definitions:
  unit time = second;
  unit volume = litre;
  unit substance = 1e-9 mole;
  unit length = 1e-6 metre;
  unit area = (1e-6 metre)^2;
  unit nanomole_per_liter = 1e-9 mole / litre;
  unit one_over_millisecond = dimensionless / (1e-3 second);
  unit liter_per_nanomole_millisecond = litre / (1e-9 mole * 1e-3 second);
  unit liter_square_per_nanomole_square_millisecond = litre^2 / ((1e-9 mole)^2 * 1e-3 second);
  unit millisecond = 1e-3 second;
  unit liter = litre;
end
